# OpenSim document version 40000
InverseKinematicsTool:
  time_range: 0 5.43
  marker_file: S001/MarkerData/NordRep01.trc
  IKTaskSet:
    IKMarkerTask r_knee: apply=true weight=1
    IKMarkerTask r_shank_antsup: apply=true weight=1
    IKMarkerTask r_ankle: apply=true weight=1
    IKMarkerTask r_calc: apply=true weight=1
    IKMarkerTask r_5meta: apply=true weight=1
    IKMarkerTask r_toe: apply=true weight=1
    IKMarkerTask L_knee: apply=true weight=1
    IKMarkerTask L_shank_antsup: apply=true weight=1
    IKMarkerTask L_ankle: apply=true weight=1
    IKMarkerTask L_calc: apply=true weight=1
    IKMarkerTask L_5meta: apply=true weight=1
    IKMarkerTask L_toe: apply=true weight=1
    IKMarkerTask r_sh2: apply=true weight=1
    IKMarkerTask r_sh3: apply=true weight=1
    IKMarkerTask r_sh4: apply=true weight=1
    IKMarkerTask L_sh2: apply=true weight=1
    IKMarkerTask L_sh3: apply=true weight=1
    IKMarkerTask r_thigh1: apply=true weight=1
    IKMarkerTask r_thigh2: apply=true weight=1
    IKMarkerTask r_thigh3: apply=true weight=1
    IKMarkerTask r_thigh4: apply=true weight=1
    IKMarkerTask r_thigh5: apply=true weight=1
    IKMarkerTask L_thigh1: apply=true weight=1
    IKMarkerTask L_thigh2: apply=true weight=1
    IKMarkerTask L_thigh3: apply=true weight=1
    IKMarkerTask L_thigh4: apply=true weight=1
    IKMarkerTask r.ASIS: apply=true weight=1
    IKMarkerTask r.PSIS: apply=true weight=1
    IKMarkerTask L.ASIS: apply=true weight=1
    IKMarkerTask L.PSIS: apply=true weight=1
    IKMarkerTask C7: apply=true weight=1
    IKMarkerTask R_Shoulder: apply=true weight=1
    IKMarkerTask L_Shoulder: apply=true weight=1
    IKMarkerTask Sternum: apply=true weight=1
    IKMarkerTask R_humerus: apply=true weight=1
    IKMarkerTask R_elbow_med: apply=true weight=1
    IKMarkerTask R_elbow_lat: apply=true weight=1
    IKMarkerTask R_forearm: apply=true weight=1
    IKMarkerTask R_wrist_radius: apply=true weight=1
    IKMarkerTask R_wrist_ulna: apply=true weight=1
    IKMarkerTask L_humerus: apply=true weight=1
    IKMarkerTask L_elbow_med: apply=true weight=1
    IKMarkerTask L_elbow_lat: apply=true weight=1
    IKMarkerTask L_forearm: apply=true weight=1
    IKMarkerTask L_wrist_radius: apply=true weight=1
    IKMarkerTask L_wrist_ulna: apply=true weight=1
    IKMarkerTask l_IC: apply=true weight=1
    IKMarkerTask r_IC: apply=true weight=1
