# OpenSim document version 40000
ExternalLoads Trimmed_NordZeroed000004:
  datafile: Trimmed_NordZeroed000004_grf_raw.mot
  ExternalForce ForcePlate1: applied_to_body=talus_l force_expressed_in_body=ground point_expressed_in_body=ground
      force_identifier=ground_force_1_v point_identifier=ground_force_1_p torque_identifier=ground_force_1_m
  ExternalForce ForcePlate2: applied_to_body=talus_l force_expressed_in_body=ground point_expressed_in_body=ground
      force_identifier=ground_force_2_v point_identifier=ground_force_2_p torque_identifier=ground_force_2_m
  ExternalForce ForcePlate3: applied_to_body=talus_r force_expressed_in_body=ground point_expressed_in_body=ground
      force_identifier=ground_force_3_v point_identifier=ground_force_3_p torque_identifier=ground_force_3_m
