# OpenSim document version 40000
Model optimized_scale_and_markers:
  gravity: 0 -9.80665 0
  length_units: meters
  force_units: N
  credits:
    Rajagopal Model w/ torso, arms, updated knee, modified for movements involving high hip and knee flexion
  publications:
    Lai,A.K.M., Arnold, A.S., Wakeling, J.M. (2017) Why are antagonist muscles co-activated in my simulation? A musculoskeletal model for analysing human locomotor tasks. Annals of Biomedical Engineering
  Ground
  BodySet:
    Body pelvis: mass=8.358073 [kg] mass_center=(-0.07381849 0 0) inertia=(0.06490986 0.06490986 0.03734148 0 0 0)
        meshes=(r_pelvis_raja.vtp l_pelvis_raja.vtp sacrum.vtp)
      WrapCylinder Gmax1_at_pelvis_r: xyz_body_rotation=(-0.6 0.3 0) translation=(-0.07790303 -0.07442778 0.07581078)
          quadrant=-x radius=0.02889906 length=0.1394361
      WrapCylinder Gmax2_at_pelvis_r: xyz_body_rotation=(-0.75 0.39 0) translation=(-0.0835287 -0.07223935 0.06387085)
          quadrant=all radius=0.03857145 length=0.09288273
      WrapCylinder Gmax3_at_pelvis_r: xyz_body_rotation=(-0.1 0 0) translation=(-0.08666102 -0.07659112 0.06387085)
          quadrant=all radius=0.03830352 length=0.09386152
      WrapCylinder Gmax1_at_pelvis_l: xyz_body_rotation=(0.6 -0.3 0) translation=(-0.07790303 -0.07442778 -0.07581078)
          quadrant=-x radius=0.02889906 length=0.1394361
      WrapCylinder Gmax2_at_pelvis_l: xyz_body_rotation=(0.75 -0.39 0) translation=(-0.0835287 -0.07223935 -0.06387085)
          quadrant=all radius=0.03857145 length=0.09288273
      WrapCylinder Gmax3_at_pelvis_l: xyz_body_rotation=(0.1 0 0) translation=(-0.08666102 -0.07659112 -0.06387085)
          quadrant=all radius=0.03830352 length=0.09386152
      WrapCylinder PS_at_brim_r: xyz_body_rotation=(-0.25 -0.27 0.1) translation=(-0.07726404 -0.05222122 0.06161659)
          quadrant=-y radius=0.05257664 length=0.1037705
      WrapCylinder PS_at_brim_l: xyz_body_rotation=(0.25 0.27 0.1) translation=(-0.07726404 -0.05222122 -0.06161659)
          quadrant=-y radius=0.05257664 length=0.1037705
      WrapCylinder IL_at_brim_r: xyz_body_rotation=(-0.32 -0.24 0.9) translation=(-0.07413172 -0.05657298 0.07100936)
          quadrant=-y radius=0.05275181 length=0.09393323
      WrapCylinder IL_at_brim_l: xyz_body_rotation=(0.32 0.24 0.9) translation=(-0.07413172 -0.05657298 -0.07100936)
          quadrant=-y radius=0.05275181 length=0.09393323
    Body femur_r: mass=8.51428 mass_center=(0 -0.175341 0) inertia=(0.130449 0.03429537 0.130449 0 0 0)
        meshes=r_femur.vtp
      WrapCylinder GasLat_at_condyles_r: translation=(0.005158655 -0.4228813 0) quadrant=all radius=0.02682093
          length=0.1034576
      WrapCylinder GasMed_at_condyles_r: translation=(0.005158655 -0.4228813 0) quadrant=all radius=0.02578936
          length=0.1034576
      WrapCylinder KnExt_at_fem_r: xyz_body_rotation=(-0.0623366 0.0507601 0)
          translation=(0.00370214 -0.4153849 0.002163412) quadrant=all radius=0.0257896 length=0.1034556
      WrapCylinder KnExtRF_at_fem_r: xyz_body_rotation=(-0.0623366 0.0507601 -0.5235988)
          translation=(0.00370214 -0.4153849 0.002163412) quadrant=+x radius=0.0257896 length=0.1034556
      WrapCylinder KnExtVL_at_fem_r: xyz_body_rotation=(-0.0623366 0.0507601 0)
          translation=(0.001948197 -0.4153849 0.002163412) quadrant=all radius=0.0257896 length=0.1034556
      WrapCylinder AB_at_femshaft_r: xyz_body_rotation=(1.66157 0.186644 0)
          translation=(0.01510805 -0.1161325 0.02417286) quadrant=all radius=0.01704674 length=0.07220175
      WrapCylinder AL_at_femshaft_r: xyz_body_rotation=(1.77711 0.136489 0)
          translation=(0.03170788 -0.239195 0.01563627) quadrant=all radius=0.02076502 length=0.1031554
      WrapCylinder AMprox_at_femshaft_r: xyz_body_rotation=(1.61126 0.18656 0)
          translation=(0.005347452 -0.07518499 0.02628133) quadrant=all radius=0.02179937 length=0.07220034
      WrapCylinder AMmid_at_femshaft_r: xyz_body_rotation=(1.61139 0.13656 0)
          translation=(0.02374271 -0.1657602 0.02129591) quadrant=all radius=0.02210937 length=0.1237714
      WrapCylinder AMdist_at_femshaft_r: xyz_body_rotation=(1.71188 0.186636 0)
          translation=(0.03260941 -0.2689277 0.009688388) quadrant=all radius=0.02252197 length=0.2062978
      WrapCylinder AMisch_at_condyles_r: xyz_body_rotation=(1.71115 -0.463363 0)
          translation=(-0.02336984 -0.3886702 -0.003263435) quadrant=all radius=0.0413239 length=0.2475672
      WrapCylinder PECT_at_femshaft_r: xyz_body_rotation=(1.81295 0.276344 0)
          translation=(0.006278837 -0.08715779 0.031493) quadrant=all radius=0.01549587 length=0.05158047
    Body tibia_r: mass=3.633158 mass_center=(0 -0.1963836 0) inertia=(0.05468076 0.005599888 0.05468076 0 0 0)
        meshes=(r_tibia.vtp r_fibula.vtp)
      WrapCylinder GasLat_at_shank_r: xyz_body_rotation=(2.96723 -0.279725 -1.47812)
          translation=(-0.007825811 -0.0830975 -0.00349641) quadrant=-y radius=0.05801878 length=0.1059156
      WrapCylinder GasMed_at_shank_r: xyz_body_rotation=(2.96723 0.0279725 -1.47812)
          translation=(-0.007825811 -0.08835683 -0.00349641) quadrant=-y radius=0.06223443 length=0.1059287
      WrapCylinder GR_at_condyles_r: xyz_body_rotation=(0 -0.4 0) translation=(-0.003172626 -0.02103734 0) quadrant=all
          radius=0.03797476 length=0.1059219
      WrapCylinder SM_at_condyles_r: xyz_body_rotation=(0 -0.1 0) translation=(-0.001057542 -0.02103734 0) quadrant=all
          radius=0.03638765 length=0.1059498
      WrapCylinder ST_at_condyles_r: xyz_body_rotation=(0 -0.2 0) translation=(-0.002115084 -0.02156328 0) quadrant=all
          radius=0.0448266 length=0.105944
      WrapCylinder BF140_at_gastroc_r: translation=(-0.04124414 -0.06311202 0) quadrant=y radius=0.03058643
          length=0.1589277
    Body patella_r: mass=0.07167101 mass_center=(0.0018 0.0264 0) inertia=(2.386262e-6 1.090031e-5 1.090031e-5 0 0 0)
        meshes=r_patella.vtp
    Body talus_r: mass=0.09473054 mass_center=(0 0 0) inertia=(0.001036127 0.001032014 0.001032014 0 0 0)
        meshes=r_talus.vtp
    Body calcn_r: mass=1.269055 mass_center=(0.1067982 0.03209462 0)
        inertia=(0.001625059 0.004518041 0.004518041 0 0 0) meshes=r_foot.vtp
    Body toes_r: mass=0.1681814 mass_center=(0.03382653 0.005863482 -0.01710549)
        inertia=(7.416879e-5 0.0001484044 0.0001484044 0 0 0) meshes=r_bofoot.vtp
    Body femur_l: mass=8.51428 mass_center=(0 -0.175341 0) inertia=(0.130449 0.03429537 0.130449 0 0 0)
        meshes=l_femur.vtp
      WrapCylinder GasLat_at_condyles_l: translation=(0.005158655 -0.4228813 0) quadrant=all radius=0.02682093
          length=0.1034576
      WrapCylinder GasMed_at_condyles_l: translation=(0.005158655 -0.4228813 0) quadrant=all radius=0.02578936
          length=0.1034576
      WrapCylinder KnExt_at_fem_l: xyz_body_rotation=(0.0623366 -0.0507601 0)
          translation=(0.00370214 -0.4153849 -0.002163412) quadrant=all radius=0.0257896 length=0.1034556
      WrapCylinder KnExtRF_at_fem_l: xyz_body_rotation=(0.0623366 -0.0507601 -0.5235988)
          translation=(0.00370214 -0.4153849 -0.002163412) quadrant=+x radius=0.0257896 length=0.1034556
      WrapCylinder KnExtVL_at_fem_l: xyz_body_rotation=(0.0623366 -0.0507601 0)
          translation=(0.001948197 -0.4153849 -0.002163412) quadrant=all radius=0.0257896 length=0.1034556
      WrapCylinder AB_at_femshaft_l: xyz_body_rotation=(-1.66157 -0.186644 0)
          translation=(0.01510805 -0.1161325 -0.02417286) quadrant=all radius=0.01704674 length=0.07220175
      WrapCylinder AL_at_femshaft_l: xyz_body_rotation=(-1.77711 -0.136489 0)
          translation=(0.03170788 -0.239195 -0.01563627) quadrant=all radius=0.02076502 length=0.1031554
      WrapCylinder AMprox_at_femshaft_l: xyz_body_rotation=(-1.61126 -0.18656 0)
          translation=(0.005347452 -0.07518499 -0.02628133) quadrant=all radius=0.02179937 length=0.07220034
      WrapCylinder AMmid_at_femshaft_l: xyz_body_rotation=(-1.61139 -0.13656 0)
          translation=(0.02374271 -0.1657602 -0.02129591) quadrant=all radius=0.02210937 length=0.1237714
      WrapCylinder AMdist_at_femshaft_l: xyz_body_rotation=(-1.71188 -0.186636 0)
          translation=(0.03260941 -0.2689277 -0.009688388) quadrant=all radius=0.02252197 length=0.2062978
      WrapCylinder AMisch_at_condyles_l: xyz_body_rotation=(-1.71115 0.463363 0)
          translation=(-0.02336984 -0.3886702 0.003263435) quadrant=all radius=0.0413239 length=0.2475672
      WrapCylinder PECT_at_femshaft_l: xyz_body_rotation=(-1.81295 -0.276344 0)
          translation=(0.006278837 -0.08715779 -0.031493) quadrant=all radius=0.01549587 length=0.05158047
    Body tibia_l: mass=3.633158 mass_center=(0 -0.1963836 0) inertia=(0.05468076 0.005599888 0.05468076 0 0 0)
        meshes=(l_tibia.vtp l_fibula.vtp)
      WrapCylinder GasLat_at_shank_l: xyz_body_rotation=(-2.96723 0.279725 -1.47812)
          translation=(-0.007825811 -0.0830975 0.00349641) quadrant=-y radius=0.05801878 length=0.1059156
      WrapCylinder GasMed_at_shank_l: xyz_body_rotation=(-2.96723 -0.0279725 -1.47812)
          translation=(-0.007825811 -0.08835683 0.00349641) quadrant=-y radius=0.06223443 length=0.1059287
      WrapCylinder GR_at_condyles_l: xyz_body_rotation=(0 0.4 0) translation=(-0.003172626 -0.02103734 0) quadrant=all
          radius=0.03797476 length=0.1059219
      WrapCylinder SM_at_condyles_l: xyz_body_rotation=(0 0.1 0) translation=(-0.001057542 -0.02103734 0) quadrant=all
          radius=0.03638765 length=0.1059498
      WrapCylinder ST_at_condyles_l: xyz_body_rotation=(0 0.2 0) translation=(-0.002115084 -0.02156328 0) quadrant=all
          radius=0.0448266 length=0.105944
      WrapCylinder BF140_at_gastroc_l: translation=(-0.04124414 -0.06311202 0) quadrant=all radius=0.03058643
          length=0.1589277
    Body patella_l: mass=0.07167101 mass_center=(0.0018 0.0264 0) inertia=(2.386262e-6 1.090031e-5 1.090031e-5 0 0 0)
        meshes=l_pat.vtp
    Body talus_l: mass=0.09473054 mass_center=(0 0 0) inertia=(0.001036127 0.001032014 0.001032014 0 0 0)
        meshes=l_talus.vtp
    Body calcn_l: mass=1.269055 mass_center=(0.1067982 0.03209462 0)
        inertia=(0.001625059 0.004518041 0.004518041 0 0 0) meshes=l_foot.vtp
    Body toes_l: mass=0.1681814 mass_center=(0.03382653 0.005863482 0.01710549)
        inertia=(7.416879e-5 0.0001484044 0.0001484044 0 0 0) meshes=l_bofoot.vtp
    Body torso: mass=26.30657 mass_center=(-0.03402849 0.3194846 0) inertia=(1.509616 0.8751759 1.509616 0 0 0)
        meshes=(hat_spine.vtp hat_jaw.vtp hat_skull.vtp hat_ribs_scap.vtp)
    Body humerus_r: mass=1.026432 mass_center=(0 -0.1380765 0) inertia=(0.004270174 0.001505971 0.004270174 0 0 0)
        meshes=humerus_rv.vtp
    Body ulna_r: mass=0.3282216 mass_center=(0 -0.1022006 0) inertia=(0.001158583 0.0002558691 0.001158583 0 0 0)
        meshes=ulna_rv.vtp
    Body radius_r: mass=0.3282216 mass_center=(0 -0.1022006 0) inertia=(0.001158583 0.0002558691 0.001158583 0 0 0)
        meshes=radius_rv.vtp
    Body hand_r: mass=0.3437273 mass_center=(0 -0.06583307 0) inertia=(0.0006263912 0.000384121 0.0009409912 0 0 0)
        meshes=(pisiform_rvs.vtp lunate_rvs.vtp scaphoid_rvs.vtp triquetrum_rvs.vtp hamate_rvs.vtp capitate_rvs.vtp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)
    Body humerus_l: mass=1.026432 mass_center=(0 -0.1380765 0) inertia=(0.004270174 0.001505971 0.004270174 0 0 0)
        meshes=humerus_lv.vtp
    Body ulna_l: mass=0.3282216 mass_center=(0 -0.1022006 0) inertia=(0.001158583 0.0002558691 0.001158583 0 0 0)
        meshes=ulna_lv.vtp
    Body radius_l: mass=0.3282216 mass_center=(0 -0.1022006 0) inertia=(0.001158583 0.0002558691 0.001158583 0 0 0)
        meshes=radius_lv.vtp
    Body hand_l: mass=0.3437273 mass_center=(0 -0.06583307 0) inertia=(0.0006263912 0.000384121 0.0009409912 0 0 0)
        meshes=(pisiform_lvs.vtp lunate_lvs.vtp scaphoid_lvs.vtp triquetrum_lvs.vtp hamate_lvs.vtp capitate_lvs.vtp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)
  JointSet:
    CustomJoint ground_pelvis: socket_parent_frame=ground_offset socket_child_frame=pelvis_offset
      Coordinate pelvis_tilt: default_value=0 range=(-3.141593 3.141593) clamped=true
      Coordinate pelvis_list: default_value=0 range=(-3.141593 3.141593) clamped=true
      Coordinate pelvis_rotation: default_value=0 range=(-3.141593 3.141593) clamped=true
      Coordinate pelvis_tx: default_value=0 range=(-20 20) clamped=true
      Coordinate pelvis_ty: default_value=0.93 range=(-2 4) clamped=true
      Coordinate pelvis_tz: default_value=0 range=(-5 5) clamped=true
      PhysicalOffsetFrame ground_offset: socket_parent=/ground translation=(0 0 0) [meters]
      PhysicalOffsetFrame pelvis_offset: socket_parent=/bodyset/pelvis translation=(0 0 0)
      SpatialTransform:
        TransformAxis rotation1: coordinates=pelvis_tilt axis=(0 0 1) LinearFunction(coefficients=1 0)
        TransformAxis rotation2: coordinates=pelvis_list axis=(1 0 0) LinearFunction(coefficients=1 0)
        TransformAxis rotation3: coordinates=pelvis_rotation axis=(0 1 0) LinearFunction(coefficients=1 0)
        TransformAxis translation1: coordinates=pelvis_tx axis=(1 0 0) LinearFunction(coefficients=1 0)
        TransformAxis translation2: coordinates=pelvis_ty axis=(0 1 0) LinearFunction(coefficients=1 0)
        TransformAxis translation3: coordinates=pelvis_tz axis=(0 0 1) LinearFunction(coefficients=1 0)
    CustomJoint hip_r: socket_parent_frame=pelvis_offset socket_child_frame=femur_r_offset
      Coordinate hip_flexion_r: default_value=2.332052e-9 range=(-0.69813 2.094395) clamped=true
      Coordinate hip_adduction_r: default_value=-1.199293e-9 range=(-0.523599 0.523599) clamped=true
      Coordinate hip_rotation_r: default_value=0 range=(-0.698132 0.698132) clamped=true
      PhysicalOffsetFrame pelvis_offset: socket_parent=/bodyset/pelvis translation=(-0.05875826 -0.06831405 0.07256856)
      PhysicalOffsetFrame femur_r_offset: socket_parent=/bodyset/femur_r translation=(0 0 0)
      SpatialTransform: axes_held_at_zero=(translation1 translation2 translation3)
        TransformAxis rotation1: coordinates=hip_flexion_r axis=(0 0 1) LinearFunction(coefficients=1 0)
        TransformAxis rotation2: coordinates=hip_adduction_r axis=(1 0 0) LinearFunction(coefficients=1 0)
        TransformAxis rotation3: coordinates=hip_rotation_r axis=(0 1 0) LinearFunction(coefficients=1 0)
    CustomJoint walker_knee_r: socket_parent_frame=femur_r_offset socket_child_frame=tibia_r_offset
      Coordinate knee_angle_r: default_value=4.877666e-5 range=(0 2.7925) clamped=true
      PhysicalOffsetFrame femur_r_offset: socket_parent=/bodyset/femur_r
          translation=(-0.004642513 -0.4224685 -0.001810522) orientation=(-1.64157 1.44618 1.5708) [radians]
      PhysicalOffsetFrame tibia_r_offset: socket_parent=/bodyset/tibia_r
          translation=(-0.008555028 -0.00371814 -0.001573109) orientation=(-1.64157 1.44618 1.5708)
      SpatialTransform:
        TransformAxis rotation1: coordinates=knee_angle_r axis=(1 0 0) LinearFunction(coefficients=1 0)
        TransformAxis rotation2: coordinates=knee_angle_r axis=(0 0 1)
          SimmSpline: x=(0 0.174533 0.349066 0.523599 0.698132 0.872665 1.0472 1.22173 1.39626 1.5708 1.74533 1.91986 2.0944)
              y=(0 0.0126809 0.0226969 0.0296054 0.0332049 0.0335354 0.0308779 0.0257548 0.0189295 0.011407 0.00443314 -0.00050475 -0.0016782)
        TransformAxis rotation3: coordinates=knee_angle_r axis=(0 1 0)
          SimmSpline: x=(0 0.174533 0.349066 0.523599 0.698132 0.872665 1.0472 1.22173 1.39626 1.5708 1.74533 1.91986 2.0944)
              y=(0 0.059461 0.109399 0.150618 0.18392 0.210107 0.229983 0.24435 0.254012 0.25977 0.262428 0.262788 0.261654)
        TransformAxis translation1: coordinates=knee_angle_r axis=(1 0 0)
          MultiplierFunction: scale=1.031731
            SimmSpline: x=(0 0.174533 0.349066 0.523599 0.698132 0.872665 1.0472 1.22173 1.39626 1.5708 1.74533 1.91986 2.0944)
                y=(-8e-10 5.29992e-5 0.000187999 0.000377999 0.000596999 0.000824999 0.001045 0.001247 0.00142 0.001558 0.001661 0.001728 0.00176)
        TransformAxis translation2: coordinates=knee_angle_r axis=(0 1 0)
          MultiplierFunction: scale=1.031418
            SimmSpline: x=(0 0.174533 0.349066 0.523599 0.698132 0.872665 1.0472 1.22173 1.39626 1.5708 1.74533 1.91986 2.0944)
                y=(-1.549e-7 0.000300845 0.000142845 -0.000401155 -0.00123315 -0.00224315 -0.00331615 -0.00434615 -0.00523915 -0.00592415 -0.00636115 -0.00653915 -0.00648015)
        TransformAxis translation3: coordinates=knee_angle_r axis=(0 0 1)
          MultiplierFunction: scale=1.034576
            SimmSpline: x=(0 0.174533 0.349066 0.523599 0.698132 0.872665 1.0472 1.22173 1.39626 1.5708 1.74533 1.91986 2.0944)
                y=(-2.896e-7 0.00105471 0.00206071 0.00288971 0.00344671 0.00367571 0.00355871 0.00310971 0.00237271 0.00141771 0.00032871 -0.00080529 -0.00189829)
    CustomJoint patellofemoral_r: socket_parent_frame=femur_r_offset socket_child_frame=patella_r_offset
      Coordinate knee_angle_beta_r: default_value=4.877666e-5 range=(0 2.7925) clamped=false
      PhysicalOffsetFrame femur_r_offset: socket_parent=/bodyset/femur_r
          translation=(-0.008346704 -0.4207772 -0.002845083)
      PhysicalOffsetFrame patella_r_offset: socket_parent=/bodyset/patella_r translation=(0 0 0)
      SpatialTransform: axes_held_at_zero=(rotation2 rotation3)
        TransformAxis rotation1: coordinates=knee_angle_beta_r axis=(0 0 1)
          SimmSpline: x=(0 0.174533 0.349066 0.523599 0.698132 0.872665 1.0472 1.22173 1.39626 1.5708 1.74533 1.91986 2.0944)
              y=(0.00113686 -0.00629212 -0.105582 -0.253683 -0.414245 -0.579047 -0.747244 -0.91799 -1.09044 -1.26379 -1.43763 -1.61186 -1.78634)
        TransformAxis translation1: coordinates=knee_angle_beta_r axis=(1 0 0)
          MultiplierFunction: scale=1.031731
            SimmSpline: x=(0 0.174533 0.349066 0.523599 0.698132 0.872665 1.0472 1.22173 1.39626 1.5708 1.74533 1.91986 2.0944)
                y=(0.0524 0.0488 0.0437 0.0371 0.0296 0.0216 0.0136 0.0057 -0.0019 -0.0088 -0.0148 -0.0196 -0.0227)
        TransformAxis translation2: coordinates=knee_angle_beta_r axis=(0 1 0)
          MultiplierFunction: scale=1.031418
            SimmSpline: x=(0 0.174533 0.349066 0.523599 0.698132 0.872665 1.0472 1.22173 1.39626 1.5708 1.74533 1.91986 2.0944)
                y=(-0.0108 -0.019 -0.0263 -0.0322 -0.0367 -0.0395 -0.0408 -0.0404 -0.0384 -0.0349 -0.0301 -0.0245 -0.0187)
        TransformAxis translation3: axis=(0 0 1) MultiplierFunction(scale=1.034576, Constant(value=0.00275))
    PinJoint ankle_r: socket_parent_frame=tibia_r_offset socket_child_frame=talus_r_offset
      Coordinate ankle_angle_r: default_value=-1.182866e-9 range=(-1.0472 0.872665) clamped=true
      PhysicalOffsetFrame tibia_r_offset: socket_parent=/bodyset/tibia_r translation=(-0.01057542 -0.4207468 0)
          orientation=(0.175895 -0.105208 0.0186622)
      PhysicalOffsetFrame talus_r_offset: socket_parent=/bodyset/talus_r translation=(0 0 0)
          orientation=(0.175895 -0.105208 0.0186622)
    PinJoint subtalar_r: socket_parent_frame=talus_r_offset socket_child_frame=calcn_r_offset
      Coordinate subtalar_angle_r: default_value=0 range=(-0.87266 0.87266) clamped=true
      PhysicalOffsetFrame talus_r_offset: socket_parent=/bodyset/talus_r
          translation=(-0.05080231 -0.04402851 0.008253652) orientation=(-1.76819 0.906223 1.8196)
      PhysicalOffsetFrame calcn_r_offset: socket_parent=/bodyset/calcn_r translation=(0 0 0)
          orientation=(-1.76819 0.906223 1.8196)
    PinJoint mtp_r: socket_parent_frame=calcn_r_offset socket_child_frame=toes_r_offset
      Coordinate mtp_angle_r: default_value=0 range=(-1.0472 1.0472) clamped=true
      PhysicalOffsetFrame calcn_r_offset: socket_parent=/bodyset/calcn_r
          translation=(0.1909551 -0.002139642 0.001154206) orientation=(-3.14159 0.619901 0)
      PhysicalOffsetFrame toes_r_offset: socket_parent=/bodyset/toes_r translation=(0 0 0)
          orientation=(-3.14159 0.619901 0)
    CustomJoint hip_l: socket_parent_frame=pelvis_offset socket_child_frame=femur_l_offset
      Coordinate hip_flexion_l: default_value=2.332052e-9 range=(-0.69813 2.094395) clamped=true
      Coordinate hip_adduction_l: default_value=-1.199293e-9 range=(-0.523599 0.523599) clamped=true
      Coordinate hip_rotation_l: default_value=0 range=(-0.698132 0.698132) clamped=true
      PhysicalOffsetFrame pelvis_offset: socket_parent=/bodyset/pelvis
          translation=(-0.05875826 -0.06831405 -0.07256856)
      PhysicalOffsetFrame femur_l_offset: socket_parent=/bodyset/femur_l translation=(0 0 0)
      SpatialTransform: axes_held_at_zero=(translation1 translation2 translation3)
        TransformAxis rotation1: coordinates=hip_flexion_l axis=(0 0 1) LinearFunction(coefficients=1 0)
        TransformAxis rotation2: coordinates=hip_adduction_l axis=(1 0 0) LinearFunction(coefficients=-1 0)
        TransformAxis rotation3: coordinates=hip_rotation_l axis=(0 1 0) LinearFunction(coefficients=-1 0)
    CustomJoint walker_knee_l: socket_parent_frame=femur_l_offset socket_child_frame=tibia_l_offset
      Coordinate knee_angle_l: default_value=4.877992e-5 range=(0 2.7925) clamped=true
      PhysicalOffsetFrame femur_l_offset: socket_parent=/bodyset/femur_l
          translation=(-0.004642513 -0.4224685 0.001810522) orientation=(1.64157 -1.44618 1.5708)
      PhysicalOffsetFrame tibia_l_offset: socket_parent=/bodyset/tibia_l
          translation=(-0.008555028 -0.00371814 0.001573109) orientation=(1.64157 -1.44618 1.5708)
      SpatialTransform:
        TransformAxis rotation1: coordinates=knee_angle_l axis=(-1 0 0) LinearFunction(coefficients=1 0)
        TransformAxis rotation2: coordinates=knee_angle_l axis=(0 0 1)
          SimmSpline: x=(0 0.174533 0.349066 0.523599 0.698132 0.872665 1.0472 1.22173 1.39626 1.5708 1.74533 1.91986 2.0944)
              y=(0 0.0126809 0.0226969 0.0296054 0.0332049 0.0335354 0.0308779 0.0257548 0.0189295 0.011407 0.00443314 -0.00050475 -0.0016782)
        TransformAxis rotation3: coordinates=knee_angle_l axis=(0 1 0)
          SimmSpline: x=(0 0.174533 0.349066 0.523599 0.698132 0.872665 1.0472 1.22173 1.39626 1.5708 1.74533 1.91986 2.0944)
              y=(0 -0.059461 -0.109399 -0.150618 -0.18392 -0.210107 -0.229983 -0.24435 -0.254012 -0.25977 -0.262428 -0.262788 -0.261654)
        TransformAxis translation1: coordinates=knee_angle_l axis=(1 0 0)
          MultiplierFunction: scale=1.031731
            SimmSpline: x=(0 0.174533 0.349066 0.523599 0.698132 0.872665 1.0472 1.22173 1.39626 1.5708 1.74533 1.91986 2.0944)
                y=(-8e-10 5.29992e-5 0.000187999 0.000377999 0.000596999 0.000824999 0.001045 0.001247 0.00142 0.001558 0.001661 0.001728 0.00176)
        TransformAxis translation2: coordinates=knee_angle_l axis=(0 1 0)
          MultiplierFunction: scale=1.031418
            SimmSpline: x=(0 0.174533 0.349066 0.523599 0.698132 0.872665 1.0472 1.22173 1.39626 1.5708 1.74533 1.91986 2.0944)
                y=(-1.549e-7 0.000300845 0.000142845 -0.000401155 -0.00123315 -0.00224315 -0.00331615 -0.00434615 -0.00523915 -0.00592415 -0.00636115 -0.00653915 -0.00648015)
        TransformAxis translation3: coordinates=knee_angle_l axis=(0 0 1)
          MultiplierFunction: scale=1.034576
            SimmSpline: x=(0 0.174533 0.349066 0.523599 0.698132 0.872665 1.0472 1.22173 1.39626 1.5708 1.74533 1.91986 2.0944)
                y=(2.896e-7 -0.00105471 -0.00206071 -0.00288971 -0.00344671 -0.00367571 -0.00355871 -0.00310971 -0.00237271 -0.00141771 -0.00032871 0.00080529 0.00189829)
    CustomJoint patellofemoral_l: socket_parent_frame=femur_l_offset socket_child_frame=patella_l_offset
      Coordinate knee_angle_beta_l: default_value=4.877992e-5 range=(0 2.7925) clamped=false
      PhysicalOffsetFrame femur_l_offset: socket_parent=/bodyset/femur_l
          translation=(-0.008346704 -0.4207772 0.002845083)
      PhysicalOffsetFrame patella_l_offset: socket_parent=/bodyset/patella_l translation=(0 0 0)
      SpatialTransform: axes_held_at_zero=(rotation2 rotation3)
        TransformAxis rotation1: coordinates=knee_angle_beta_l axis=(0 0 1)
          SimmSpline: x=(0 0.174533 0.349066 0.523599 0.698132 0.872665 1.0472 1.22173 1.39626 1.5708 1.74533 1.91986 2.0944)
              y=(0.00113686 -0.00629212 -0.105582 -0.253683 -0.414245 -0.579047 -0.747244 -0.91799 -1.09044 -1.26379 -1.43763 -1.61186 -1.78634)
        TransformAxis translation1: coordinates=knee_angle_beta_l axis=(1 0 0)
          MultiplierFunction: scale=1.031731
            SimmSpline: x=(0 0.174533 0.349066 0.523599 0.698132 0.872665 1.0472 1.22173 1.39626 1.5708 1.74533 1.91986 2.0944)
                y=(0.0524 0.0488 0.0437 0.0371 0.0296 0.0216 0.0136 0.0057 -0.0019 -0.0088 -0.0148 -0.0196 -0.0227)
        TransformAxis translation2: coordinates=knee_angle_beta_l axis=(0 1 0)
          MultiplierFunction: scale=1.031418
            SimmSpline: x=(0 0.174533 0.349066 0.523599 0.698132 0.872665 1.0472 1.22173 1.39626 1.5708 1.74533 1.91986 2.0944)
                y=(-0.0108 -0.019 -0.0263 -0.0322 -0.0367 -0.0395 -0.0408 -0.0404 -0.0384 -0.0349 -0.0301 -0.0245 -0.0187)
        TransformAxis translation3: axis=(0 0 1) MultiplierFunction(scale=1.034576, Constant(value=-0.00275))
    PinJoint ankle_l: socket_parent_frame=tibia_l_offset socket_child_frame=talus_l_offset
      Coordinate ankle_angle_l: default_value=8.352658e-11 range=(-1.0472 0.872665) clamped=true
      PhysicalOffsetFrame tibia_l_offset: socket_parent=/bodyset/tibia_l translation=(-0.01057542 -0.4207468 0)
          orientation=(-0.175895 0.105208 0.0186622)
      PhysicalOffsetFrame talus_l_offset: socket_parent=/bodyset/talus_l translation=(0 0 0)
          orientation=(-0.175895 0.105208 0.0186622)
    PinJoint subtalar_l: socket_parent_frame=talus_l_offset socket_child_frame=calcn_l_offset
      Coordinate subtalar_angle_l: default_value=0 range=(-0.87266 0.87266) clamped=true
      PhysicalOffsetFrame talus_l_offset: socket_parent=/bodyset/talus_l
          translation=(-0.05080231 -0.04402851 -0.008253652) orientation=(1.76819 -0.906223 1.8196)
      PhysicalOffsetFrame calcn_l_offset: socket_parent=/bodyset/calcn_l translation=(0 0 0)
          orientation=(1.76819 -0.906223 1.8196)
    PinJoint mtp_l: socket_parent_frame=calcn_l_offset socket_child_frame=toes_l_offset
      Coordinate mtp_angle_l: default_value=0 range=(-1.0472 1.0472) clamped=true
      PhysicalOffsetFrame calcn_l_offset: socket_parent=/bodyset/calcn_l
          translation=(0.1909551 -0.002139642 -0.001154206) orientation=(-3.14159 -0.619901 0)
      PhysicalOffsetFrame toes_l_offset: socket_parent=/bodyset/toes_l translation=(0 0 0)
          orientation=(-3.14159 -0.619901 0)
    CustomJoint back: socket_parent_frame=pelvis_offset socket_child_frame=torso_offset
      Coordinate lumbar_extension: default_value=0 range=(-1.570796 1.570796) clamped=true
      Coordinate lumbar_bending: default_value=0 range=(-1.570796 1.570796) clamped=true
      Coordinate lumbar_rotation: default_value=0 range=(-1.570796 1.570796) clamped=true
      PhysicalOffsetFrame pelvis_offset: socket_parent=/bodyset/pelvis translation=(-0.1051417 0.07093382 0)
      PhysicalOffsetFrame torso_offset: socket_parent=/bodyset/torso translation=(0 0 0)
      SpatialTransform: axes_held_at_zero=(translation1 translation2 translation3)
        TransformAxis rotation1: coordinates=lumbar_extension axis=(0 0 1) LinearFunction(coefficients=1 0)
        TransformAxis rotation2: coordinates=lumbar_bending axis=(1 0 0) LinearFunction(coefficients=1 0)
        TransformAxis rotation3: coordinates=lumbar_rotation axis=(0 1 0) LinearFunction(coefficients=1 0)
    CustomJoint acromial_r: socket_parent_frame=torso_offset socket_child_frame=humerus_r_offset
      Coordinate arm_flex_r: default_value=0 range=(-1.570796 1.570796) clamped=true
      Coordinate arm_add_r: default_value=0 range=(-2.094395 1.570796) clamped=true
      Coordinate arm_rot_r: default_value=0 range=(-1.570796 1.570796) clamped=true
      PhysicalOffsetFrame torso_offset: socket_parent=/bodyset/torso translation=(0.003578663 0.3709017 0.1770475)
      PhysicalOffsetFrame humerus_r_offset: socket_parent=/bodyset/humerus_r translation=(0 0 0)
      SpatialTransform: axes_held_at_zero=(translation1 translation2 translation3)
        TransformAxis rotation1: coordinates=arm_flex_r axis=(0 0 1) LinearFunction(coefficients=1 0)
        TransformAxis rotation2: coordinates=arm_add_r axis=(1 0 0) LinearFunction(coefficients=1 0)
        TransformAxis rotation3: coordinates=arm_rot_r axis=(0 1 0) LinearFunction(coefficients=1 0)
    PinJoint elbow_r: socket_parent_frame=humerus_r_offset socket_child_frame=ulna_r_offset
      Coordinate elbow_flex_r: default_value=0 range=(0 2.618) clamped=true
      PhysicalOffsetFrame humerus_r_offset: socket_parent=/bodyset/humerus_r
          translation=(0.01116582 -0.2402863 -0.008173282) orientation=(-0.0228627 0.228018 0.0051689)
      PhysicalOffsetFrame ulna_r_offset: socket_parent=/bodyset/ulna_r translation=(0 0 0)
          orientation=(-0.0228627 0.228018 0.0051689)
    CustomJoint acromial_l: socket_parent_frame=torso_offset socket_child_frame=humerus_l_offset
      Coordinate arm_flex_l: default_value=0 range=(-1.570796 1.570796) clamped=true
      Coordinate arm_add_l: default_value=0 range=(-2.094395 1.570796) clamped=true
      Coordinate arm_rot_l: default_value=0 range=(-1.570796 1.570796) clamped=true
      PhysicalOffsetFrame torso_offset: socket_parent=/bodyset/torso translation=(0.003578663 0.3709017 -0.1770475)
      PhysicalOffsetFrame humerus_l_offset: socket_parent=/bodyset/humerus_l translation=(0 0 0)
      SpatialTransform: axes_held_at_zero=(translation1 translation2 translation3)
        TransformAxis rotation1: coordinates=arm_flex_l axis=(0 0 1) LinearFunction(coefficients=1 0)
        TransformAxis rotation2: coordinates=arm_add_l axis=(-1 0 0) LinearFunction(coefficients=1 0)
        TransformAxis rotation3: coordinates=arm_rot_l axis=(0 -1 0) LinearFunction(coefficients=1 0)
    PinJoint elbow_l: socket_parent_frame=humerus_l_offset socket_child_frame=ulna_l_offset
      Coordinate elbow_flex_l: default_value=0 range=(0 2.618) clamped=true
      PhysicalOffsetFrame humerus_l_offset: socket_parent=/bodyset/humerus_l
          translation=(0.01116582 -0.2402863 0.008173282) orientation=(0.0228627 -0.228018 0.0051689)
      PhysicalOffsetFrame ulna_l_offset: socket_parent=/bodyset/ulna_l translation=(0 0 0)
          orientation=(0.0228627 -0.228018 0.0051689)
    WeldJoint radioulnar_r: socket_parent_frame=ulna_r_offset socket_child_frame=radius_r_offset
      PhysicalOffsetFrame ulna_r_offset: socket_parent=/bodyset/ulna_r
          translation=(-0.005861219 -0.01102944 0.02294032) orientation=(-1.56884 0.056428 1.53614)
      PhysicalOffsetFrame radius_r_offset: socket_parent=/bodyset/radius_r translation=(0 0 0)
          orientation=(-1.570796 0 0)
    WeldJoint radioulnar_l: socket_parent_frame=ulna_l_offset socket_child_frame=radius_l_offset
      PhysicalOffsetFrame ulna_l_offset: socket_parent=/bodyset/ulna_l
          translation=(-0.005861219 -0.01102944 -0.02294032) orientation=(1.56884 -0.056428 1.53614)
      PhysicalOffsetFrame radius_l_offset: socket_parent=/bodyset/radius_l translation=(0 0 0)
          orientation=(1.570796 0 0)
    WeldJoint radius_hand_r: socket_parent_frame=radius_r_offset socket_child_frame=hand_r_offset
      PhysicalOffsetFrame radius_r_offset: socket_parent=/bodyset/radius_r
          translation=(-0.007664805 -0.1999841 0.01197016) orientation=(-1.5708 0 -1.5708)
      PhysicalOffsetFrame hand_r_offset: socket_parent=/bodyset/hand_r translation=(0 0 0)
          orientation=(-1.5708 0 -1.5708)
    WeldJoint radius_hand_l: socket_parent_frame=radius_l_offset socket_child_frame=hand_l_offset
      PhysicalOffsetFrame radius_l_offset: socket_parent=/bodyset/radius_l
          translation=(-0.007664805 -0.1999841 -0.01197016) orientation=(1.5708 0 1.5708)
      PhysicalOffsetFrame hand_l_offset: socket_parent=/bodyset/hand_l translation=(0 0 0)
          orientation=(1.5708 0 1.5708)
  ConstraintSet:
    CoordinateCouplerConstraint patellofemoral_knee_angle_r_con: independent_coordinate_names=knee_angle_r
        dependent_coordinate_name=knee_angle_beta_r scale_factor=1
        coupled_coordinates_function=LinearFunction(coefficients=1 0)
    CoordinateCouplerConstraint patellofemoral_knee_angle_l_con: independent_coordinate_names=knee_angle_l
        dependent_coordinate_name=knee_angle_beta_l scale_factor=1
        coupled_coordinates_function=LinearFunction(coefficients=1 0)
  ForceSet:
    CoordinateActuator lumbar_extension: coordinate=lumbar_extension optimal_force=10
    CoordinateActuator lumbar_bending: coordinate=lumbar_bending optimal_force=10
    CoordinateActuator lumbar_rotation: coordinate=lumbar_rotation optimal_force=10
    CoordinateActuator shoulder_flex_r: coordinate=arm_flex_r optimal_force=10
    CoordinateActuator shoulder_add_r: coordinate=arm_add_r optimal_force=10
    CoordinateActuator shoulder_rot_r: coordinate=arm_rot_r optimal_force=10
    CoordinateActuator elbow_flex_r: coordinate=elbow_flex_r optimal_force=10
    CoordinateActuator shoulder_flex_l: coordinate=arm_flex_l optimal_force=10
    CoordinateActuator shoulder_add_l: coordinate=arm_add_l optimal_force=10
    CoordinateActuator shoulder_rot_l: coordinate=arm_rot_l optimal_force=10
    CoordinateActuator elbow_flex_l: coordinate=elbow_flex_l optimal_force=10
    DeGrooteFregly2016Muscle [values shared by the 80 below unless stated]: min_control=0.01 max_control=1
        max_contraction_velocity=12 activation_time_constant=0.01 deactivation_time_constant=0.04
        default_activation=0.01 fiber_damping=0.01 passive_fiber_strain_at_one_norm_force=0.6
        tendon_strain_at_one_norm_force=0.049 ignore_passive_fiber_force=false tendon_compliance_dynamics_mode=implicit
    DeGrooteFregly2016Muscle addbrev_r: max_isometric_force=625.8197 optimal_fiber_length=0.1053774
        tendon_slack_length=0.03623336 pennation_angle_at_optimal=0.1147809 [radians]
      PathPoint P1: pelvis (-0.01994248 -0.08181324 0.01446487)
      PathPoint P2: femur_r (-0.002063462 -0.1217073 0.02576093)
      PathWrap: wrap_object=AB_at_femshaft_r method=hybrid
    DeGrooteFregly2016Muscle addlong_r: max_isometric_force=916.8 optimal_fiber_length=0.111676
        tendon_slack_length=0.1360335 pennation_angle_at_optimal=0.1377704
      PathPoint P1: pelvis (-0.007914344 -0.07737443 0.01773355)
      PathPoint P2: femur_r (0.01161729 -0.2468905 0.01637733)
      PathWrap: wrap_object=AL_at_femshaft_r method=hybrid
    DeGrooteFregly2016Muscle addmagDist_r: max_isometric_force=597.2951 optimal_fiber_length=0.1882058
        tendon_slack_length=0.09280787 pennation_angle_at_optimal=0.194705
      PathPoint P1: pelvis (-0.07730581 -0.111118 0.03740202)
      PathPoint P2: femur_r (0.01160697 -0.2707471 0.01996731)
      PathWrap: wrap_object=AMdist_at_femshaft_r method=hybrid
    DeGrooteFregly2016Muscle addmagIsch_r: max_isometric_force=597.2951 optimal_fiber_length=0.1649277
        tendon_slack_length=0.2284312 pennation_angle_at_optimal=0.1680443
      PathPoint P1: pelvis (-0.09357302 -0.1129371 0.03917725)
      PathPoint P2: femur_r (0.004962626 -0.4001591 -0.03386166)
      PathWrap: wrap_object=AMisch_at_condyles_r method=hybrid
    DeGrooteFregly2016Muscle addmagMid_r: max_isometric_force=597.2951 optimal_fiber_length=0.1454238
        tendon_slack_length=0.04924312 pennation_angle_at_optimal=0.2073076
      PathPoint P1: pelvis (-0.05498276 -0.1050952 0.02680697)
      PathPoint P2: femur_r (0.002496789 -0.1675022 0.0302303)
      PathWrap: wrap_object=AMmid_at_femshaft_r method=hybrid
    DeGrooteFregly2016Muscle addmagProx_r: max_isometric_force=597.2951 optimal_fiber_length=0.1069083
        tendon_slack_length=0.04082366 pennation_angle_at_optimal=0.3114833
      PathPoint P1: pelvis (-0.03234649 -0.09360653 0.01282113)
      PathPoint P2: femur_r (-0.01575453 -0.0813376 0.03312711)
      PathWrap: wrap_object=AMprox_at_femshaft_r method=hybrid
    DeGrooteFregly2016Muscle bflh_r: max_isometric_force=1313.184 optimal_fiber_length=0.1025083
        tendon_slack_length=0.3492215 pennation_angle_at_optimal=0.1759182
      PathPoint P1: pelvis (-0.1085873 -0.1036591 0.05504164)
      PathPoint P2: tibia_r (-0.02576172 -0.03837211 0.03833337)
      PathPoint P3: tibia_r (-0.01802052 -0.0526775 0.03682885)
    DeGrooteFregly2016Muscle bfsh_r: max_isometric_force=557.1148 optimal_fiber_length=0.1141001
        tendon_slack_length=0.1094628 pennation_angle_at_optimal=0.2642232
      PathPoint P1: femur_r (0.005158655 -0.2177323 0.02420907)
      PathPoint P2: tibia_r (-0.03030915 -0.03454331 0.03394696)
    DeGrooteFregly2016Muscle edl_r: max_isometric_force=603.4982 optimal_fiber_length=0.07263391
        tendon_slack_length=0.3866212 pennation_angle_at_optimal=0.2182582
      PathPoint P1: tibia_r (-0.01692067 -0.121701 0.02172012)
      PathPoint P2: tibia_r (0.01734369 -0.395502 0.0118666)
      PathPoint P3: calcn_r (0.09814751 0.03851355 0.0008549673)
      PathPoint P4: calcn_r (0.1725858 0.005884014 0.01389322)
      PathPoint P5: toes_r (0.0002932936 0.004593061 0.01495508)
      PathPoint P6: toes_r (0.04330969 -0.0003908988 0.02443641)
    DeGrooteFregly2016Muscle ehl_r: max_isometric_force=285.8675 optimal_fiber_length=0.07836381
        tendon_slack_length=0.3423653 pennation_angle_at_optimal=0.1972681
      PathPoint P1: tibia_r (-0.01480559 -0.1630394 0.02002489)
      PathPoint P2: tibia_r (0.007508548 -0.3059881 0.0173761)
      PathPoint P3: tibia_r (0.02115084 -0.3884545 -0.002966651)
      PathPoint P4: calcn_r (0.1035942 0.04161603 -0.02254976)
      PathPoint P5: calcn_r (0.13809 0.03305746 -0.02746582)
      PathPoint P6: calcn_r (0.185188 0.01487051 -0.02992385)
      PathPoint P7: toes_r (0.02913383 0.004006713 -0.02394768)
      PathPoint P8: toes_r (0.05504143 0.00332264 -0.01818069)
    DeGrooteFregly2016Muscle fdl_r: max_isometric_force=423.177 optimal_fiber_length=0.04671587
        tendon_slack_length=0.3967422 pennation_angle_at_optimal=0.2248391
      PathPoint P1: tibia_r (-0.002432347 -0.192702 -0.001907133)
      PathPoint P2: tibia_r (-0.01861274 -0.3834055 -0.01313803)
      PathPoint P3: calcn_r (0.046564 0.03369935 -0.02992385)
      PathPoint P4: calcn_r (0.0756131 0.01882885 -0.02810705)
      PathPoint P5: calcn_r (0.1770714 -0.008665548 0.01239703)
      PathPoint P6: toes_r (-0.001857526 -0.007622527 0.01436861)
      PathPoint P7: toes_r (0.02786289 -0.006938454 0.02101531)
      PathPoint P8: toes_r (0.04311416 -0.005863482 0.02365445)
    DeGrooteFregly2016Muscle fhl_r: max_isometric_force=907.8393 optimal_fiber_length=0.05517057
        tendon_slack_length=0.3709511 pennation_angle_at_optimal=0.2580255
      PathPoint P1: tibia_r (-0.0327838 -0.2275188 0.02119036)
      PathPoint P2: tibia_r (-0.02559252 -0.3861404 -0.008052338)
      PathPoint P3: calcn_r (0.03994251 0.02952705 -0.02575589)
      PathPoint P4: calcn_r (0.1108565 0.007274781 -0.02735895)
      PathPoint P5: calcn_r (0.1843336 -0.00567005 -0.02874827)
      PathPoint P6: toes_r (0.0151535 -0.006254381 -0.0259026)
      PathPoint P7: toes_r (0.05494366 -0.00996792 -0.01769196)
    DeGrooteFregly2016Muscle gaslat_r: max_isometric_force=1575.059 optimal_fiber_length=0.07233604
        tendon_slack_length=0.3920823 pennation_angle_at_optimal=0.2102268 tendon_strain_at_one_norm_force=0.1
      PathPoint P1: femur_r (0.002063462 -0.3929701 0.02130191)
      PathPoint P2: calcn_r (0.004699119 0.03316444 -0.005664158)
      PathWrap: wrap_object=GasLat_at_shank_r method=hybrid
      PathWrap pathwrap_0: wrap_object=GasLat_at_condyles_r method=hybrid
    DeGrooteFregly2016Muscle gasmed_r: max_isometric_force=3115.515 optimal_fiber_length=0.06173527
        tendon_slack_length=0.4049415 pennation_angle_at_optimal=0.1656816 tendon_strain_at_one_norm_force=0.1
      PathPoint P1: femur_r (0.006190386 -0.3970958 -0.02276067)
      PathPoint P2: calcn_r (0.004699119 0.03316444 -0.005664158)
      PathWrap: wrap_object=GasMed_at_shank_r method=hybrid
      PathWrap pathwrap_0: wrap_object=GasMed_at_condyles_r method=hybrid
    DeGrooteFregly2016Muscle glmax1_r: max_isometric_force=983.7836 optimal_fiber_length=0.1384778
        tendon_slack_length=0.08223889 pennation_angle_at_optimal=0.3540118
      PathPoint P1: pelvis (-0.1285298 0.0300272 0.05288131)
      PathPoint P2: pelvis (-0.1312445 -0.02106256 0.0731697)
      PathPoint P3: femur_r (-0.04580886 -0.03362422 0.03124419)
      PathPoint P4: femur_r (-0.02857895 -0.05837824 0.04862506)
      PathWrap: wrap_object=Gmax1_at_pelvis_r method=hybrid
    DeGrooteFregly2016Muscle glmax2_r: max_isometric_force=1406.046 optimal_fiber_length=0.1523015
        tendon_slack_length=0.105738 pennation_angle_at_optimal=0.3673821
      PathPoint P1: pelvis (-0.1375091 0.007572076 0.04339461)
      PathPoint P2: pelvis (-0.1403282 -0.05300453 0.07636324)
      PathPoint P3: femur_r (-0.0464279 -0.06023479 0.02607131)
      PathPoint P4: femur_r (-0.016095 -0.104792 0.04334872)
      PathWrap: wrap_object=Gmax2_at_pelvis_r method=hybrid
    DeGrooteFregly2016Muscle glmax3_r: max_isometric_force=947.7541 optimal_fiber_length=0.1667477
        tendon_slack_length=0.1028444 pennation_angle_at_optimal=0.3824161
      PathPoint P1: pelvis (-0.1357341 -0.04569356 0.008453495)
      PathPoint P2: pelvis (-0.132915 -0.1099257 0.04085856)
      PathPoint P3: femur_r (-0.02899164 -0.1160345 0.009725011)
      PathPoint P4: femur_r (-0.006190386 -0.1463582 0.04252106)
      PathWrap: wrap_object=Gmax3_at_pelvis_r method=hybrid
    DeGrooteFregly2016Muscle glmed1_r: max_isometric_force=1093.467 optimal_fiber_length=0.06963158
        tendon_slack_length=0.05324129 pennation_angle_at_optimal=0.3165559
      PathPoint P1: pelvis (-0.05130479 0.02276258 0.1082877)
      PathPoint P2: femur_r (-0.01433255 -0.01886948 0.06123614)
    DeGrooteFregly2016Muscle glmed2_r: max_isometric_force=765.0917 optimal_fiber_length=0.07608181
        tendon_slack_length=0.0680034 pennation_angle_at_optimal=0.3165559
      PathPoint P1: pelvis (-0.08846454 0.04755083 0.07700525)
      PathPoint P2: femur_r (-0.02273524 -0.01027199 0.05806683)
    DeGrooteFregly2016Muscle glmed3_r: max_isometric_force=871.1993 optimal_fiber_length=0.07207177
        tendon_slack_length=0.04465768 pennation_angle_at_optimal=0.3165559
      PathPoint P1: pelvis (-0.1042707 0.01354217 0.06002134)
      PathPoint P2: femur_r (-0.03188049 -0.004847663 0.05359102)
    DeGrooteFregly2016Muscle glmin1_r: max_isometric_force=374.0459 optimal_fiber_length=0.0745898
        tendon_slack_length=0.01770168 pennation_angle_at_optimal=0.1745329
      PathPoint P1: pelvis (-0.03088425 -9.418675e-5 0.1112616)
      PathPoint P2: femur_r (0.005663501 -0.01597522 0.05797535)
    DeGrooteFregly2016Muscle glmin2_r: max_isometric_force=394.8197 optimal_fiber_length=0.06231306
        tendon_slack_length=0.02904128 pennation_angle_at_optimal=0
      PathPoint P1: pelvis (-0.06431709 0.008703768 0.09500351)
      PathPoint P2: femur_r (0.003655981 -0.009295414 0.05427832)
    DeGrooteFregly2016Muscle glmin3_r: max_isometric_force=446.7738 optimal_fiber_length=0.03339025
        tendon_slack_length=0.0447012 pennation_angle_at_optimal=0.01745329
      PathPoint P1: pelvis (-0.08238018 -0.01349048 0.07495432)
      PathPoint P2: femur_r (-0.003689612 -0.001306498 0.05303406)
    DeGrooteFregly2016Muscle grac_r: max_isometric_force=281.3115 optimal_fiber_length=0.2399737
        tendon_slack_length=0.1812063 pennation_angle_at_optimal=0.1720016
      PathPoint P1: pelvis (-0.04944899 -0.1125541 0.02306865)
      PathPoint P2: tibia_r (-0.01947992 -0.05001628 -0.03137233)
      PathPoint P3: tibia_r (0.001882425 -0.07323099 -0.01666622)
      PathWrap: wrap_object=GR_at_condyles_r method=hybrid
    DeGrooteFregly2016Muscle iliacus_r: max_isometric_force=1021.141 optimal_fiber_length=0.1009465
        tendon_slack_length=0.09102296 pennation_angle_at_optimal=0.279914
      PathPoint P1: pelvis (-0.06316858 0.02689393 0.07918107)
      PathPoint P2: pelvis (-0.01543045 -0.04873414 0.0707911)
      PathPoint P3: femur_r (-0.002372981 -0.0582751 0.0143806)
      PathPoint P4: femur_r (-0.01258712 -0.06570131 0.02027768)
      PathWrap: wrap_object=IL_at_brim_r method=hybrid range=(2 3)
    DeGrooteFregly2016Muscle perbrev_r: max_isometric_force=521.2016 optimal_fiber_length=0.04801059
        tendon_slack_length=0.1560107 pennation_angle_at_optimal=0.2052361
      PathPoint P1: tibia_r (-0.02569827 -0.2663327 0.02659391)
      PathPoint P2: tibia_r (-0.03585067 -0.4094919 0.026382)
      PathPoint P3: tibia_r (-0.03013995 -0.4211676 0.02701771)
      PathPoint P4: calcn_r (0.05030193 0.02888516 0.02490092)
      PathPoint P5: calcn_r (0.07230236 0.02342908 0.03665672)
    DeGrooteFregly2016Muscle perlong_r: max_isometric_force=1115.371 optimal_fiber_length=0.05370027
        tendon_slack_length=0.3511879 pennation_angle_at_optimal=0.2479525
      PathPoint P1: tibia_r (-0.02115084 -0.1444213 0.02987841)
      PathPoint P2: tibia_r (-0.03352408 -0.4102282 0.02511058)
      PathPoint P3: tibia_r (-0.02876514 -0.4222194 0.02542844)
      PathPoint P4: calcn_r (0.0467776 0.02460588 0.02361847)
      PathPoint P5: calcn_r (0.07272955 0.0113401 0.03035134)
      PathPoint P6: calcn_r (0.09099203 0.007381763 0.01261077)
      PathPoint P7: calcn_r (0.1284782 0.009093477 -0.01966425)
    DeGrooteFregly2016Muscle piri_r: max_isometric_force=1029.787 optimal_fiber_length=0.02477171
        tendon_slack_length=0.1094778 pennation_angle_at_optimal=0.1745329
      PathPoint P1: pelvis (-0.1063007 -0.005683409 0.01268964)
      PathPoint P2: pelvis (-0.10652 -0.02668504 0.05722077)
      PathPoint P3: femur_r (-0.01526962 -0.003713104 0.04521096)
    DeGrooteFregly2016Muscle psoas_r: max_isometric_force=1426.79 optimal_fiber_length=0.1120953
        tendon_slack_length=0.09545183 pennation_angle_at_optimal=0.2155251
      PathPoint P1: pelvis (-0.06327299 0.05396192 0.03663181)
      PathPoint P2: pelvis (-0.01687139 -0.05705055 0.062817)
      PathPoint P3: femur_r (-0.008460194 -0.05332429 0.004759048)
      PathPoint P4: femur_r (-0.01908702 -0.05920338 0.009104266)
      PathWrap: wrap_object=PS_at_brim_r method=hybrid range=(2 3)
    DeGrooteFregly2016Muscle recfem_r: max_isometric_force=2191.741 optimal_fiber_length=0.07745557
        tendon_slack_length=0.4596309 pennation_angle_at_optimal=0.2170149
      PathPoint P1: pelvis (-0.02505861 -0.03376972 0.08763456)
      PathPoint P2: patella_r (0.01 0.049 0.0007)
      PathPoint P3: patella_r (0.0121 0.0437 -0.001)
      PathPoint P4: patella_r (0.005 0.00247 3e-5)
      PathPoint P5: tibia_r (0.03447587 -0.06639385 -0.0004979735)
      PathWrap: wrap_object=KnExtRF_at_fem_r method=hybrid
    DeGrooteFregly2016Muscle sart_r: max_isometric_force=249.4131 optimal_fiber_length=0.4126786
        tendon_slack_length=0.1269779 pennation_angle_at_optimal=0.02613542
      PathPoint P1: pelvis (-0.02036012 -0.01357752 0.09918767)
      PathPoint P2: pelvis (-0.0125293 -0.02663282 0.09918767)
      PathPoint P3: femur_r (0.002495345 -0.3886888 -0.03833558)
      PathPoint P4: tibia_r (-0.0265443 -0.04217987 -0.03867241)
      PathPoint P5: tibia_r (-0.01681492 -0.06300684 -0.02797128)
      PathPoint P6: tibia_r (0.01438257 -0.08520123 -0.002754747)
    DeGrooteFregly2016Muscle semimem_r: max_isometric_force=2200.987 optimal_fiber_length=0.09385177
        tendon_slack_length=0.3655854 pennation_angle_at_optimal=0.2545615
      PathPoint P1: pelvis (-0.1030535 -0.09922031 0.05767162)
      PathPoint P2: tibia_r (-0.01811608 -0.05807092 -0.01971735)
      PathWrap: wrap_object=SM_at_condyles_r method=hybrid
    DeGrooteFregly2016Muscle semiten_r: max_isometric_force=591.2951 optimal_fiber_length=0.2027066
        tendon_slack_length=0.2596314 pennation_angle_at_optimal=0.241295
      PathPoint P1: pelvis (-0.1083785 -0.1090553 0.04837278)
      PathPoint P2: tibia_r (-0.01899345 -0.06458464 -0.01951632)
      PathPoint P3: tibia_r (0.00200933 -0.08130933 -0.01239636)
      PathWrap: wrap_object=ST_at_condyles_r method=hybrid
    DeGrooteFregly2016Muscle soleus_r: max_isometric_force=6194.843 optimal_fiber_length=0.04618383
        tendon_slack_length=0.2953141 pennation_angle_at_optimal=0.3814289 tendon_strain_at_one_norm_force=0.1
      PathPoint P1: tibia_r (-0.008037319 -0.09635102 0.01038328)
      PathPoint P2: calcn_r (0.004699119 0.03316444 -0.005664158)
    DeGrooteFregly2016Muscle tfl_r: max_isometric_force=411.2066 optimal_fiber_length=0.09378711
        tendon_slack_length=0.4437582 pennation_angle_at_optimal=0.05235988
      PathPoint P1: pelvis (-0.02123695 0.009444508 0.1214462)
      PathPoint P2: femur_r (0.03033289 -0.1026261 0.06176417)
      PathPoint P3: femur_r (0.01103952 -0.4177242 0.03352025)
      PathPoint P4: tibia_r (0.01142145 -0.04312655 0.03665933)
    DeGrooteFregly2016Muscle tibant_r: max_isometric_force=1227.452 optimal_fiber_length=0.07204073
        tendon_slack_length=0.2536309 pennation_angle_at_optimal=0.1951828
      PathPoint P1: tibia_r (0.01628615 -0.138005 0.01716419)
      PathPoint P2: tibia_r (0.0265443 -0.2004859 0.01356183)
      PathPoint P3: tibia_r (0.02464073 -0.3848782 -0.01398564)
      PathPoint P4: calcn_r (0.1245267 0.01904281 -0.03259563)
    DeGrooteFregly2016Muscle tibpost_r: max_isometric_force=1730.154 optimal_fiber_length=0.03976257
        tendon_slack_length=0.2953576 pennation_angle_at_optimal=0.2264891
      PathPoint P1: tibia_r (-0.004335922 -0.1371635 0.01091304)
      PathPoint P2: tibia_r (-0.01734369 -0.3844574 -0.01854157)
      PathPoint P3: calcn_r (0.04453483 0.03573201 -0.03056508)
      PathPoint P4: calcn_r (0.08244818 0.01701015 -0.03003073)
    DeGrooteFregly2016Muscle vasint_r: max_isometric_force=1697.361 optimal_fiber_length=0.1210403
        tendon_slack_length=0.2120792 pennation_angle_at_optimal=0.06309973
      PathPoint P1: femur_r (0.0299202 -0.1984448 0.03207185)
      PathPoint P2: femur_r (0.03456299 -0.2149474 0.02948541)
      ConditionalPathPoint P2a: femur_r (0.03039587 -0.3900892 0.007001655)
          socket_coordinate=/jointset/walker_knee_r/knee_angle_r range=(1.658063 3.141593) [radians]
      PathPoint P3: patella_r (0.0058 0.048 -0.0006)
      PathPoint P4: patella_r (0.005 0.00247 -0.00039)
      PathPoint P5: tibia_r (0.03444414 -0.066478 0.0004555928)
      PathWrap: wrap_object=KnExt_at_fem_r method=hybrid
    DeGrooteFregly2016Muscle vaslat_r: max_isometric_force=5148.767 optimal_fiber_length=0.1210174
        tendon_slack_length=0.2285884 pennation_angle_at_optimal=0.2528673
      PathPoint P1: femur_r (0.004952309 -0.1912248 0.03610669)
      PathPoint P2: femur_r (0.02775356 -0.2672403 0.04231415)
      ConditionalPathPoint P2a: femur_r (0.02870656 -0.3882582 0.02421452)
          socket_coordinate=/jointset/walker_knee_r/knee_angle_r range=(1.518436 3.141593)
      PathPoint P3: patella_r (0.0103 0.0423 0.0141)
      PathPoint P4: patella_r (0.005 0.00247 0.00733)
      PathPoint P5: tibia_r (0.03441242 -0.06666734 0.005414138)
      PathWrap: wrap_object=KnExtVL_at_fem_r method=hybrid
    DeGrooteFregly2016Muscle vasmed_r: max_isometric_force=2747.823 optimal_fiber_length=0.1137531
        tendon_slack_length=0.2150968 pennation_angle_at_optimal=0.4222225
      PathPoint P1: femur_r (0.01444423 -0.2164946 0.01945002)
      PathPoint P2: femur_r (0.03672962 -0.2855996 0.0009311181)
      ConditionalPathPoint P2a: femur_r (0.03056372 -0.3921015 -0.0110809)
          socket_coordinate=/jointset/walker_knee_r/knee_angle_r range=(1.605703 3.141593)
      PathPoint P3: patella_r (0.0063 0.0445 -0.017)
      PathPoint P4: patella_r (0.005 0.00247 -0.0085)
      PathPoint P5: tibia_r (0.03373559 -0.06686719 -0.007183533)
      PathWrap: wrap_object=KnExt_at_fem_r method=hybrid
    DeGrooteFregly2016Muscle addbrev_l: max_isometric_force=625.8197 optimal_fiber_length=0.1053774
        tendon_slack_length=0.03623336 pennation_angle_at_optimal=0.1147809
      PathPoint P1: pelvis (-0.01994248 -0.08181324 -0.01446487)
      PathPoint P2: femur_l (-0.002063462 -0.1217073 -0.02576093)
      PathWrap: wrap_object=AB_at_femshaft_l method=hybrid
    DeGrooteFregly2016Muscle addlong_l: max_isometric_force=916.8 optimal_fiber_length=0.111676
        tendon_slack_length=0.1360335 pennation_angle_at_optimal=0.1377704
      PathPoint P1: pelvis (-0.007914344 -0.07737443 -0.01773355)
      PathPoint P2: femur_l (0.01161729 -0.2468905 -0.01637733)
      PathWrap: wrap_object=AL_at_femshaft_l method=hybrid
    DeGrooteFregly2016Muscle addmagDist_l: max_isometric_force=597.2951 optimal_fiber_length=0.1882058
        tendon_slack_length=0.09280787 pennation_angle_at_optimal=0.194705
      PathPoint P1: pelvis (-0.07730581 -0.111118 -0.03740202)
      PathPoint P2: femur_l (0.01160697 -0.2707471 -0.01996731)
      PathWrap: wrap_object=AMdist_at_femshaft_l method=hybrid
    DeGrooteFregly2016Muscle addmagIsch_l: max_isometric_force=597.2951 optimal_fiber_length=0.1649277
        tendon_slack_length=0.2284312 pennation_angle_at_optimal=0.1680443
      PathPoint P1: pelvis (-0.09357302 -0.1129371 -0.03917725)
      PathPoint P2: femur_l (0.004962626 -0.4001591 0.03386166)
      PathWrap: wrap_object=AMisch_at_condyles_l method=hybrid
    DeGrooteFregly2016Muscle addmagMid_l: max_isometric_force=597.2951 optimal_fiber_length=0.1454238
        tendon_slack_length=0.04924312 pennation_angle_at_optimal=0.2073076
      PathPoint P1: pelvis (-0.05498276 -0.1050952 -0.02680697)
      PathPoint P2: femur_l (0.002496789 -0.1675022 -0.0302303)
      PathWrap: wrap_object=AMmid_at_femshaft_l method=hybrid
    DeGrooteFregly2016Muscle addmagProx_l: max_isometric_force=597.2951 optimal_fiber_length=0.1069083
        tendon_slack_length=0.04082366 pennation_angle_at_optimal=0.3114833
      PathPoint P1: pelvis (-0.03234649 -0.09360653 -0.01282113)
      PathPoint P2: femur_l (-0.01575453 -0.0813376 -0.03312711)
      PathWrap: wrap_object=AMprox_at_femshaft_l method=hybrid
    DeGrooteFregly2016Muscle bflh_l: max_isometric_force=1313.184 optimal_fiber_length=0.1025083
        tendon_slack_length=0.3492215 pennation_angle_at_optimal=0.1759182
      PathPoint P1: pelvis (-0.1085873 -0.1036591 -0.05504164)
      PathPoint P2: tibia_l (-0.02576172 -0.03837211 -0.03833337)
      PathPoint P3: tibia_l (-0.01802052 -0.0526775 -0.03682885)
    DeGrooteFregly2016Muscle bfsh_l: max_isometric_force=557.1148 optimal_fiber_length=0.1141001
        tendon_slack_length=0.1094628 pennation_angle_at_optimal=0.2642232
      PathPoint P1: femur_l (0.005158655 -0.2177323 -0.02420907)
      PathPoint P2: tibia_l (-0.03030915 -0.03454331 -0.03394696)
    DeGrooteFregly2016Muscle edl_l: max_isometric_force=603.4982 optimal_fiber_length=0.07263391
        tendon_slack_length=0.3866212 pennation_angle_at_optimal=0.2182582
      PathPoint P1: tibia_l (-0.01692067 -0.121701 -0.02172012)
      PathPoint P2: tibia_l (0.01734369 -0.395502 -0.0118666)
      PathPoint P3: calcn_l (0.09814751 0.03851355 -0.0008549673)
      PathPoint P4: calcn_l (0.1725858 0.005884014 -0.01389322)
      PathPoint P5: toes_l (0.0002932936 0.004593061 -0.01495508)
      PathPoint P6: toes_l (0.04330969 -0.0003908988 -0.02443641)
    DeGrooteFregly2016Muscle ehl_l: max_isometric_force=285.8675 optimal_fiber_length=0.07836381
        tendon_slack_length=0.3423653 pennation_angle_at_optimal=0.1972681
      PathPoint P1: tibia_l (-0.01480559 -0.1630394 -0.02002489)
      PathPoint P2: tibia_l (0.007508548 -0.3059881 -0.0173761)
      PathPoint P3: tibia_l (0.02115084 -0.3884545 0.002966651)
      PathPoint P4: calcn_l (0.1035942 0.04161603 0.02254976)
      PathPoint P5: calcn_l (0.13809 0.03305746 0.02746582)
      PathPoint P6: calcn_l (0.185188 0.01487051 0.02992385)
      PathPoint P7: toes_l (0.02913383 0.004006713 0.02394768)
      PathPoint P8: toes_l (0.05504143 0.00332264 0.01818069)
    DeGrooteFregly2016Muscle fdl_l: max_isometric_force=423.177 optimal_fiber_length=0.04671587
        tendon_slack_length=0.3967422 pennation_angle_at_optimal=0.2248391
      PathPoint P1: tibia_l (-0.002432347 -0.192702 0.001907133)
      PathPoint P2: tibia_l (-0.01861274 -0.3834055 0.01313803)
      PathPoint P3: calcn_l (0.046564 0.03369935 0.02992385)
      PathPoint P4: calcn_l (0.0756131 0.01882885 0.02810705)
      PathPoint P5: calcn_l (0.1770714 -0.008665548 -0.01239703)
      PathPoint P6: toes_l (-0.001857526 -0.007622527 -0.01436861)
      PathPoint P7: toes_l (0.02786289 -0.006938454 -0.02101531)
      PathPoint P8: toes_l (0.04311416 -0.005863482 -0.02365445)
    DeGrooteFregly2016Muscle fhl_l: max_isometric_force=907.8393 optimal_fiber_length=0.05517057
        tendon_slack_length=0.3709511 pennation_angle_at_optimal=0.2580255
      PathPoint P1: tibia_l (-0.0327838 -0.2275188 -0.02119036)
      PathPoint P2: tibia_l (-0.02559252 -0.3861404 0.008052338)
      PathPoint P3: calcn_l (0.03994251 0.02952705 0.02575589)
      PathPoint P4: calcn_l (0.1108565 0.007274781 0.02735895)
      PathPoint P5: calcn_l (0.1843336 -0.00567005 0.02874827)
      PathPoint P6: toes_l (0.0151535 -0.006254381 0.0259026)
      PathPoint P7: toes_l (0.05494366 -0.00996792 0.01769196)
    DeGrooteFregly2016Muscle gaslat_l: max_isometric_force=1575.059 optimal_fiber_length=0.07233604
        tendon_slack_length=0.3920823 pennation_angle_at_optimal=0.2102268 tendon_strain_at_one_norm_force=0.1
      PathPoint P1: femur_l (0.002063462 -0.3929701 -0.02130191)
      PathPoint P2: calcn_l (0.004699119 0.03316444 0.005664158)
      PathWrap: wrap_object=GasLat_at_shank_l method=hybrid
      PathWrap pathwrap_0: wrap_object=GasLat_at_condyles_l method=hybrid
    DeGrooteFregly2016Muscle gasmed_l: max_isometric_force=3115.515 optimal_fiber_length=0.06173527
        tendon_slack_length=0.4049415 pennation_angle_at_optimal=0.1656816 tendon_strain_at_one_norm_force=0.1
      PathPoint P1: femur_l (0.006190386 -0.3970958 0.02276067)
      PathPoint P2: calcn_l (0.004699119 0.03316444 0.005664158)
      PathWrap: wrap_object=GasMed_at_shank_l method=hybrid
      PathWrap pathwrap_0: wrap_object=GasMed_at_condyles_l method=hybrid
    DeGrooteFregly2016Muscle glmax1_l: max_isometric_force=983.7836 optimal_fiber_length=0.1384778
        tendon_slack_length=0.08223889 pennation_angle_at_optimal=0.3540118
      PathPoint P1: pelvis (-0.1285298 0.0300272 -0.05288131)
      PathPoint P2: pelvis (-0.1312445 -0.02106256 -0.0731697)
      PathPoint P3: femur_l (-0.04580886 -0.03362422 -0.03124419)
      PathPoint P4: femur_l (-0.02857895 -0.05837824 -0.04862506)
      PathWrap: wrap_object=Gmax1_at_pelvis_l method=hybrid
    DeGrooteFregly2016Muscle glmax2_l: max_isometric_force=1406.046 optimal_fiber_length=0.1523015
        tendon_slack_length=0.105738 pennation_angle_at_optimal=0.3673821
      PathPoint P1: pelvis (-0.1375091 0.007572076 -0.04339461)
      PathPoint P2: pelvis (-0.1403282 -0.05300453 -0.07636324)
      PathPoint P3: femur_l (-0.0464279 -0.06023479 -0.02607131)
      PathPoint P4: femur_l (-0.016095 -0.104792 -0.04334872)
      PathWrap: wrap_object=Gmax2_at_pelvis_l method=hybrid
    DeGrooteFregly2016Muscle glmax3_l: max_isometric_force=947.7541 optimal_fiber_length=0.1667477
        tendon_slack_length=0.1028444 pennation_angle_at_optimal=0.3824161
      PathPoint P1: pelvis (-0.1357341 -0.04569356 -0.008453495)
      PathPoint P2: pelvis (-0.132915 -0.1099257 -0.04085856)
      PathPoint P3: femur_l (-0.02899164 -0.1160345 -0.009725011)
      PathPoint P4: femur_l (-0.006190386 -0.1463582 -0.04252106)
      PathWrap: wrap_object=Gmax3_at_pelvis_l method=hybrid
    DeGrooteFregly2016Muscle glmed1_l: max_isometric_force=1093.467 optimal_fiber_length=0.06941789
        tendon_slack_length=0.0530779 pennation_angle_at_optimal=0.3165559
      PathPoint P1: pelvis (-0.05116133 0.02262919 -0.1080169)
      PathPoint P2: femur_l (-0.01444423 -0.01856552 -0.06103997)
    DeGrooteFregly2016Muscle glmed2_l: max_isometric_force=765.0917 optimal_fiber_length=0.07624341
        tendon_slack_length=0.06814784 pennation_angle_at_optimal=0.3165559
      PathPoint P1: pelvis (-0.08874924 0.04786945 -0.07702073)
      PathPoint P2: femur_l (-0.02269808 -0.01031418 -0.05793624)
    DeGrooteFregly2016Muscle glmed3_l: max_isometric_force=871.1993 optimal_fiber_length=0.07224543
        tendon_slack_length=0.04476529 pennation_angle_at_optimal=0.3165559
      PathPoint P1: pelvis (-0.1044109 0.01392566 -0.06011374)
      PathPoint P2: femur_l (-0.03188049 -0.004847663 -0.05359102)
    DeGrooteFregly2016Muscle glmin1_l: max_isometric_force=374.0459 optimal_fiber_length=0.07435123
        tendon_slack_length=0.01764506 pennation_angle_at_optimal=0.1745329
      PathPoint P1: pelvis (-0.03132326 0 -0.1108347)
      PathPoint P2: femur_l (0.005158655 -0.01547127 -0.05793624)
    DeGrooteFregly2016Muscle glmin2_l: max_isometric_force=394.8197 optimal_fiber_length=0.06225798
        tendon_slack_length=0.02901561 pennation_angle_at_optimal=0
      PathPoint P1: pelvis (-0.0643171 0.008703536 -0.094867)
      PathPoint P2: femur_l (0.004126924 -0.009282759 -0.05379794)
    DeGrooteFregly2016Muscle glmin3_l: max_isometric_force=446.7738 optimal_fiber_length=0.03318371
        tendon_slack_length=0.04442469 pennation_angle_at_optimal=0.01745329
      PathPoint P1: pelvis (-0.08238018 -0.01349048 -0.07495432)
      PathPoint P2: femur_l (-0.004126924 -0.001031418 -0.05276336)
    DeGrooteFregly2016Muscle grac_l: max_isometric_force=281.3115 optimal_fiber_length=0.2399737
        tendon_slack_length=0.1812063 pennation_angle_at_optimal=0.1720016
      PathPoint P1: pelvis (-0.04944899 -0.1125541 -0.02306865)
      PathPoint P2: tibia_l (-0.01947992 -0.05001628 0.03137233)
      PathPoint P3: tibia_l (0.001882425 -0.07323099 0.01666622)
      PathWrap: wrap_object=GR_at_condyles_l method=hybrid
    DeGrooteFregly2016Muscle iliacus_l: max_isometric_force=1021.141 optimal_fiber_length=0.1009465
        tendon_slack_length=0.09102296 pennation_angle_at_optimal=0.279914
      PathPoint P1: pelvis (-0.06316858 0.02689393 -0.07918107)
      PathPoint P2: pelvis (-0.01543045 -0.04873414 -0.0707911)
      PathPoint P3: femur_l (-0.002372981 -0.0582751 -0.0143806)
      PathPoint P4: femur_l (-0.01258712 -0.06570131 -0.02027768)
      PathWrap: wrap_object=IL_at_brim_l method=hybrid range=(2 3)
    DeGrooteFregly2016Muscle perbrev_l: max_isometric_force=521.2016 optimal_fiber_length=0.04801059
        tendon_slack_length=0.1560107 pennation_angle_at_optimal=0.2052361
      PathPoint P1: tibia_l (-0.02569827 -0.2663327 -0.02659391)
      PathPoint P2: tibia_l (-0.03585067 -0.4094919 -0.026382)
      PathPoint P3: tibia_l (-0.03013995 -0.4211676 -0.02701771)
      PathPoint P4: calcn_l (0.05030193 0.02888516 -0.02490092)
      PathPoint P5: calcn_l (0.07230236 0.02342908 -0.03665672)
    DeGrooteFregly2016Muscle perlong_l: max_isometric_force=1115.371 optimal_fiber_length=0.05370027
        tendon_slack_length=0.3511879 pennation_angle_at_optimal=0.2479525
      PathPoint P1: tibia_l (-0.02115084 -0.1444213 -0.02987841)
      PathPoint P2: tibia_l (-0.03352408 -0.4102282 -0.02511058)
      PathPoint P3: tibia_l (-0.02876514 -0.4222194 -0.02542844)
      PathPoint P4: calcn_l (0.0467776 0.02460588 -0.02361847)
      PathPoint P5: calcn_l (0.07272955 0.0113401 -0.03035134)
      PathPoint P6: calcn_l (0.09099203 0.007381763 -0.01261077)
      PathPoint P7: calcn_l (0.1284782 0.009093477 0.01966425)
    DeGrooteFregly2016Muscle piri_l: max_isometric_force=1029.787 optimal_fiber_length=0.02477171
        tendon_slack_length=0.1094778 pennation_angle_at_optimal=0.1745329
      PathPoint P1: pelvis (-0.1063007 -0.005683409 -0.01268964)
      PathPoint P2: pelvis (-0.10652 -0.02668504 -0.05722077)
      PathPoint P3: femur_l (-0.01526962 -0.003713104 -0.04521096)
    DeGrooteFregly2016Muscle psoas_l: max_isometric_force=1426.79 optimal_fiber_length=0.1120953
        tendon_slack_length=0.09545183 pennation_angle_at_optimal=0.2155251
      PathPoint P1: pelvis (-0.06327299 0.05396192 -0.03663181)
      PathPoint P2: pelvis (-0.01687139 -0.05705055 -0.062817)
      PathPoint P3: femur_l (-0.008460194 -0.05332429 -0.004759048)
      PathPoint P4: femur_l (-0.01908702 -0.05920338 -0.009104266)
      PathWrap: wrap_object=PS_at_brim_l method=hybrid range=(2 3)
    DeGrooteFregly2016Muscle recfem_l: max_isometric_force=2191.741 optimal_fiber_length=0.07745557
        tendon_slack_length=0.4596309 pennation_angle_at_optimal=0.2170149
      PathPoint P1: pelvis (-0.02505861 -0.03376972 -0.08763456)
      PathPoint P2: patella_l (0.01 0.049 -0.0007)
      PathPoint P3: patella_l (0.0121 0.0437 0.001)
      PathPoint P4: patella_l (0.005 0.00247 -3e-5)
      PathPoint P5: tibia_l (0.03447587 -0.06639385 0.0004979735)
      PathWrap: wrap_object=KnExtRF_at_fem_l method=hybrid
    DeGrooteFregly2016Muscle sart_l: max_isometric_force=249.4131 optimal_fiber_length=0.4126786
        tendon_slack_length=0.1269779 pennation_angle_at_optimal=0.02613542
      PathPoint P1: pelvis (-0.02036012 -0.01357752 -0.09918767)
      PathPoint P2: pelvis (-0.0125293 -0.02663282 -0.09918767)
      PathPoint P3: femur_l (0.002495345 -0.3886888 0.03833558)
      PathPoint P4: tibia_l (-0.0265443 -0.04217987 0.03867241)
      PathPoint P5: tibia_l (-0.01681492 -0.06300684 0.02797128)
      PathPoint P6: tibia_l (0.01438257 -0.08520123 0.002754747)
    DeGrooteFregly2016Muscle semimem_l: max_isometric_force=2200.987 optimal_fiber_length=0.09385177
        tendon_slack_length=0.3655854 pennation_angle_at_optimal=0.2545615
      PathPoint P1: pelvis (-0.1030535 -0.09922031 -0.05767162)
      PathPoint P2: tibia_l (-0.01811608 -0.05807092 0.01971735)
      PathWrap: wrap_object=SM_at_condyles_l method=hybrid
    DeGrooteFregly2016Muscle semiten_l: max_isometric_force=591.2951 optimal_fiber_length=0.2027066
        tendon_slack_length=0.2596314 pennation_angle_at_optimal=0.241295
      PathPoint P1: pelvis (-0.1083785 -0.1090553 -0.04837278)
      PathPoint P2: tibia_l (-0.01899345 -0.06458464 0.01951632)
      PathPoint P3: tibia_l (0.00200933 -0.08130933 0.01239636)
      PathWrap: wrap_object=ST_at_condyles_l method=hybrid
    DeGrooteFregly2016Muscle soleus_l: max_isometric_force=6194.843 optimal_fiber_length=0.04618383
        tendon_slack_length=0.2953141 pennation_angle_at_optimal=0.3814289 tendon_strain_at_one_norm_force=0.1
      PathPoint P1: tibia_l (-0.008037319 -0.09635102 -0.01038328)
      PathPoint P2: calcn_l (0.004699119 0.03316444 0.005664158)
    DeGrooteFregly2016Muscle tfl_l: max_isometric_force=411.2066 optimal_fiber_length=0.09381538
        tendon_slack_length=0.443892 pennation_angle_at_optimal=0.05235988
      PathPoint P1: pelvis (-0.02088217 0.00957389 -0.1211668)
      PathPoint P2: femur_l (0.03033289 -0.1026261 -0.06176417)
      PathPoint P3: femur_l (0.01103952 -0.4177242 -0.03352025)
      PathPoint P4: tibia_l (0.01142145 -0.04312655 -0.03665933)
    DeGrooteFregly2016Muscle tibant_l: max_isometric_force=1227.452 optimal_fiber_length=0.07204073
        tendon_slack_length=0.2536309 pennation_angle_at_optimal=0.1951828
      PathPoint P1: tibia_l (0.01628615 -0.138005 -0.01716419)
      PathPoint P2: tibia_l (0.0265443 -0.2004859 -0.01356183)
      PathPoint P3: tibia_l (0.02464073 -0.3848782 0.01398564)
      PathPoint P4: calcn_l (0.1245267 0.01904281 0.03259563)
    DeGrooteFregly2016Muscle tibpost_l: max_isometric_force=1730.154 optimal_fiber_length=0.03976257
        tendon_slack_length=0.2953576 pennation_angle_at_optimal=0.2264891
      PathPoint P1: tibia_l (-0.004335922 -0.1371635 -0.01091304)
      PathPoint P2: tibia_l (-0.01734369 -0.3844574 0.01854157)
      PathPoint P3: calcn_l (0.04453483 0.03573201 0.03056508)
      PathPoint P4: calcn_l (0.08244818 0.01701015 0.03003073)
    DeGrooteFregly2016Muscle vasint_l: max_isometric_force=1697.361 optimal_fiber_length=0.1210403
        tendon_slack_length=0.2120792 pennation_angle_at_optimal=0.06309973
      PathPoint P1: femur_l (0.0299202 -0.1984448 -0.03207185)
      PathPoint P2: femur_l (0.03456299 -0.2149474 -0.02948541)
      ConditionalPathPoint P2a: femur_l (0.03039587 -0.3900892 -0.007001655)
          socket_coordinate=/jointset/walker_knee_l/knee_angle_l range=(1.658063 3.141593)
      PathPoint P3: patella_l (0.0058 0.048 0.0006)
      PathPoint P4: patella_l (0.005 0.00247 0.00039)
      PathPoint P5: tibia_l (0.03444414 -0.066478 -0.0004555928)
      PathWrap: wrap_object=KnExt_at_fem_l method=hybrid
    DeGrooteFregly2016Muscle vaslat_l: max_isometric_force=5148.767 optimal_fiber_length=0.1210174
        tendon_slack_length=0.2285884 pennation_angle_at_optimal=0.2528673
      PathPoint P1: femur_l (0.004952309 -0.1912248 -0.03610669)
      PathPoint P2: femur_l (0.02775356 -0.2672403 -0.04231415)
      ConditionalPathPoint P2a: femur_l (0.02870656 -0.3882582 -0.02421452)
          socket_coordinate=/jointset/walker_knee_l/knee_angle_l range=(1.518436 3.141593)
      PathPoint P3: patella_l (0.0103 0.0423 -0.0141)
      PathPoint P4: patella_l (0.005 0.00247 -0.00733)
      PathPoint P5: tibia_l (0.03441242 -0.06666734 -0.005414138)
      PathWrap: wrap_object=KnExtVL_at_fem_l method=hybrid
    DeGrooteFregly2016Muscle vasmed_l: max_isometric_force=2747.823 optimal_fiber_length=0.1137531
        tendon_slack_length=0.2150968 pennation_angle_at_optimal=0.4222225
      PathPoint P1: femur_l (0.01444423 -0.2164946 -0.01945002)
      PathPoint P2: femur_l (0.03672962 -0.2855996 -0.0009311181)
      ConditionalPathPoint P2a: femur_l (0.03056372 -0.3921015 0.0110809)
          socket_coordinate=/jointset/walker_knee_l/knee_angle_l range=(1.605703 3.141593)
      PathPoint P3: patella_l (0.0063 0.0445 0.017)
      PathPoint P4: patella_l (0.005 0.00247 0.0085)
      PathPoint P5: tibia_l (0.03373559 -0.06686719 0.007183533)
      PathWrap: wrap_object=KnExt_at_fem_l method=hybrid
    SpringGeneralizedForce rightPassiveMomentMTPFlexion_Sasaki2009: coordinate=mtp_angle_r stiffness=25 rest_length=0
        viscosity=0.03
    SpringGeneralizedForce leftPassiveMomentMTPFlexion_Sasaki2009: coordinate=mtp_angle_l stiffness=25 rest_length=0
        viscosity=0.03
    ExpressionBasedCoordinateForce rightPassiveMomentKneeFlexion_Zelle2009: coordinate=knee_angle_r
        expression=-25.385677*(tanh(4.066036*q-12.097768)+0.999998)
    ExpressionBasedCoordinateForce leftPassiveMomentKneeFlexion_Zelle2009: coordinate=knee_angle_l
        expression=-25.385677*(tanh(4.066036*q-12.097768)+0.999998)
    ExpressionBasedCoordinateForce rightPassiveMomentHipRotation_vanArkel2015: coordinate=hip_rotation_r
        expression=-1.799123*exp(24.428054*(q-0.569022))+1.777588*exp(-24.428057*(q+0.568529))
    ExpressionBasedCoordinateForce leftPassiveMomentHipRotation_vanArkel2015: coordinate=hip_rotation_l
        expression=-1.799123*exp(24.428054*(q-0.569022))+1.777588*exp(-24.428057*(q+0.568529))
    ExpressionBasedCoordinateForce rightPassiveMomentHipFlexion_Andersen1999: coordinate=hip_flexion_r
        expression=-2.44*exp(5.05*(q-1.81))+1.51*exp(-21.88*(q+0.47))
    ExpressionBasedCoordinateForce leftPassiveMomentHipFlexion_Andersen1999: coordinate=hip_flexion_l
        expression=-2.44*exp(5.05*(q-1.81))+1.51*exp(-21.88*(q+0.47))
    ExpressionBasedCoordinateForce rightPassiveMomentHipAdduction_Andersen1999: coordinate=hip_adduction_r
        expression=-0.03*exp(14.94*(q-0.5))+0.03*exp(-14.94*(q+0.5))
    ExpressionBasedCoordinateForce leftPassiveMomentHipAdduction_Andersen1999: coordinate=hip_adduction_l
        expression=-0.03*exp(14.94*(q-0.5))+0.03*exp(-14.94*(q+0.5))
    ExpressionBasedBushingForce rightPassiveMomentAnkle_DeMers2017: socket_frame1=tibia_r_offset
        socket_frame2=calcn_r_offset Mx_expression=9.52095038*theta_x-29.57608094*theta_x^2+169.01588105*theta_x^3
        My_expression=3.61796125*theta_y-10.1612135*theta_y^2+64.5279144*theta_y^3
        Mz_expression=5.98187224*theta_z+15.74951827*theta_z^2+33.6780792*theta_z^3 Fx_expression=0 Fy_expression=0
        Fz_expression=0 rotational_damping=(0 0 0) translational_damping=(0 0 0) moment_visual_scale=1
        force_visual_scale=1
      PhysicalOffsetFrame tibia_r_offset: socket_parent=/bodyset/tibia_r translation=(-0.01057542 -0.4207468 0)
      PhysicalOffsetFrame calcn_r_offset: socket_parent=/bodyset/calcn_r
          translation=(0.05208546 0.04487898 -0.008464176)
    ExpressionBasedBushingForce leftPassiveMomentAnkle_DeMers2017: socket_frame1=tibia_l_offset
        socket_frame2=calcn_l_offset Mx_expression=-9.52095038*theta_x-29.57608094*theta_x^2-169.01588105*theta_x^3
        My_expression=-3.61796125*theta_y-10.1612135*theta_y^2-64.5279144*theta_y^3
        Mz_expression=5.98187224*theta_z+15.74951827*theta_z^2+33.6780792*theta_z^3 Fx_expression=0 Fy_expression=0
        Fz_expression=0 rotational_damping=(0 0 0) translational_damping=(0 0 0) moment_visual_scale=1
        force_visual_scale=1
      PhysicalOffsetFrame tibia_l_offset: socket_parent=/bodyset/tibia_l translation=(-0.01057542 -0.4207468 0)
      PhysicalOffsetFrame calcn_l_offset: socket_parent=/bodyset/calcn_l
          translation=(0.05208546 0.04487898 0.008464176)
    ObjectGroup right_leg: members=(addbrev_r addlong_r addmagDist_r addmagIsch_r addmagMid_r addmagProx_r edl_r ehl_r fdl_r fhl_r gasmed_r glmax1_r glmax2_r glmax3_r glmed1_r glmed2_r glmed3_r glmin1_r glmin2_r glmin3_r grac_r iliacus_r perbrev_r perlong_r piri_r psoas_r recfem_r sart_r semimem_r semiten_r soleus_r tfl_r tibant_r tibpost_r vasint_r vasmed_r)
    ObjectGroup left_leg: members=(addbrev_l addlong_l addmagDist_l addmagIsch_l addmagMid_l addmagProx_l edl_l ehl_l fdl_l fhl_l gasmed_l glmax1_l glmax2_l glmax3_l glmed1_l glmed2_l glmed3_l glmin1_l glmin2_l glmin3_l grac_l iliacus_l perbrev_l perlong_l piri_l psoas_l recfem_l sart_l semimem_l semiten_l soleus_l tfl_l tibant_l tibpost_l vasint_l vasmed_l)
    ObjectGroup hip_add_r: members=(addbrev_r addlong_r addmagDist_r addmagIsch_r addmagMid_r addmagProx_r grac_r semimem_r semiten_r)
    ObjectGroup hip_abd_r: members=(glmax1_r glmed1_r glmed2_r glmed3_r glmin1_r glmin2_r glmin3_r piri_r sart_r tfl_r)
    ObjectGroup hip_flex_r: members=(addbrev_r addlong_r glmin1_r grac_r iliacus_r psoas_r recfem_r sart_r tfl_r)
    ObjectGroup hip_ext_r: members=(addlong_r addmagDist_r addmagIsch_r addmagMid_r addmagProx_r glmax1_r glmax2_r glmax3_r glmed1_r glmed2_r glmed3_r glmin3_r semimem_r semiten_r)
    ObjectGroup hip_inrot_r: members=(glmed1_r glmed2_r glmed3_r glmin1_r iliacus_r psoas_r tfl_r)
    ObjectGroup hip_exrot_r: members=(glmin3_r piri_r)
    ObjectGroup knee_flex_r: members=(gasmed_r grac_r sart_r semimem_r semiten_r)
    ObjectGroup knee_ext_r: members=(recfem_r vasint_r vasmed_r)
    ObjectGroup ankle_df_r: members=(edl_r ehl_r tibant_r)
    ObjectGroup ankle_pf_r: members=(fdl_r fhl_r gasmed_r perbrev_r perlong_r soleus_r tibpost_r)
    ObjectGroup everter_r: members=(edl_r perbrev_r perlong_r)
    ObjectGroup inverter_r: members=(ehl_r fdl_r fhl_r tibant_r tibpost_r)
    ObjectGroup hip_add_l: members=(addbrev_l addlong_l addmagDist_l addmagIsch_l addmagMid_l addmagProx_l grac_l semimem_l semiten_l)
    ObjectGroup hip_abd_l: members=(glmax1_l glmed1_l glmed2_l glmed3_l glmin1_l glmin2_l glmin3_l sart_l tfl_l)
    ObjectGroup hip_flex_l: members=(addbrev_l addlong_l glmin1_l grac_l iliacus_l psoas_l recfem_l sart_l tfl_l)
    ObjectGroup hip_ext_l: members=(addlong_l addmagDist_l addmagIsch_l addmagMid_l addmagProx_l glmax1_l glmax2_l glmax3_l glmed1_l glmed2_l glmed3_l glmin3_l semimem_l semiten_l)
    ObjectGroup hip_exrot_l: members=glmin3_l
    ObjectGroup hip_inrot_l: members=(glmed1_l glmed2_l glmed3_l glmin1_l iliacus_l psoas_l tfl_l)
    ObjectGroup knee_flex_l: members=(gasmed_l grac_l sart_l semimem_l semiten_l)
    ObjectGroup knee_ext_l: members=(recfem_l vasint_l vasmed_l)
    ObjectGroup ankle_df_l: members=(edl_l ehl_l tibant_l)
    ObjectGroup ankle_pf_l: members=(fdl_l fhl_l gasmed_l perbrev_l perlong_l soleus_l tibpost_l)
    ObjectGroup everter_l: members=(edl_l perbrev_l perlong_l)
    ObjectGroup inverter_l: members=(ehl_l fdl_l fhl_l tibant_l tibpost_l)
  MarkerSet:
    Marker r_knee: femur_r (0.005979476 -0.4442481 0.0604168) fixed=true
    Marker r_shank_antsup: tibia_r (-0.0054803 -0.1245323 0.07785768)
    Marker r_ankle: tibia_r (-0.007039316 -0.4292701 0.05187837) fixed=true
    Marker r_calc: calcn_r (-0.00865616 0.02571581 -0.005438939) fixed=true
    Marker r_5meta: calcn_r (0.1577551 -0.04075315 0.05145949)
    Marker r_toe: calcn_r (0.201311 -0.002822819 0.02162079)
    Marker L_knee: femur_l (0.01006006 -0.4540826 -0.05649437) fixed=true
    Marker L_shank_antsup: tibia_l (0.02190336 -0.09290439 -0.07404659)
    Marker L_ankle: tibia_l (0.009203208 -0.3792213 -0.05322174)
    Marker L_calc: calcn_l (0.009837626 0.06167467 -0.004485896)
    Marker L_5meta: calcn_l (0.1788889 -0.01752371 -0.03637172)
    Marker L_toe: calcn_l (0.2120719 0.01574774 0.002492925)
    Marker r_sh2: tibia_r (0.004745003 -0.2463593 0.07921416)
    Marker r_sh3: tibia_r (-0.08210171 -0.1338153 0.07027412)
    Marker r_sh4: tibia_r (-0.07340413 -0.2501626 0.05531562)
    Marker L_sh2: tibia_l (-0.06685917 -0.09960827 -0.06350987)
    Marker L_sh3: tibia_l (-0.04817334 -0.2195817 -0.06993411)
    Marker r_thigh1: femur_r (0.081395 -0.2166079 0.0472607)
    Marker r_thigh2: femur_r (0.07391496 -0.3324053 0.03292891)
    Marker r_thigh3: femur_r (0.03827938 -0.3613545 0.06558967)
    Marker r_thigh4: femur_r (-0.0155316 -0.2156881 0.09563955)
    Marker r_thigh5: femur_r (-0.02093922 -0.3314696 0.07781602)
    Marker L_thigh1: femur_l (0.06448117 -0.2043179 -0.08442815)
    Marker L_thigh2: femur_l (0.06604021 -0.343277 -0.06661332)
    Marker L_thigh3: femur_l (-0.05449947 -0.2026758 -0.09158548)
    Marker L_thigh4: femur_l (-0.05062806 -0.3371532 -0.05474786)
    Marker r.ASIS: pelvis (0.01512168 0.002087224 0.1234502)
    Marker r.PSIS: pelvis (-0.1556139 0.01958913 0.05051109)
    Marker L.ASIS: pelvis (0.014897 0.005592368 -0.1238785)
    Marker L.PSIS: pelvis (-0.1484076 0.02142888 -0.05003472)
    Marker C7: torso (-0.05014055 0.4284941 -0.0008896015) fixed=true
    Marker R_Shoulder: torso (0.03881851 0.3925147 0.1309034)
    Marker L_Shoulder: torso (0.05230232 0.4075103 -0.1230672)
    Marker Sternum: torso (0.1345347 0.3368729 0.006704658)
    Marker R_humerus: humerus_r (-0.005937662 -0.1170748 0.01637549)
    Marker R_elbow_med: humerus_r (-0.002638911 -0.2440133 -0.0372952) fixed=true
    Marker R_elbow_lat: humerus_r (0.0005278075 -0.2375039 0.03458531) fixed=true
    Marker R_forearm: radius_r (-0.06032032 -0.06619978 0.03005731)
    Marker R_wrist_radius: radius_r (-0.01065116 -0.1977618 0.0434394) fixed=true
    Marker R_wrist_ulna: ulna_r (-0.003639248 -0.1814695 0.1287882)
    Marker L_humerus: humerus_l (-0.004434221 -0.1077855 -0.01701295)
    Marker L_elbow_med: humerus_l (0.006008214 -0.2407901 0.03472074) fixed=true
    Marker L_elbow_lat: humerus_l (0.007643305 -0.2406669 -0.03270364) fixed=true
    Marker L_forearm: radius_l (-0.03274825 -0.08131439 -0.01142465)
    Marker L_wrist_radius: radius_l (0.002571139 -0.2008043 -0.04102159) fixed=true
    Marker L_wrist_ulna: ulna_l (-0.03323998 -0.2087126 -0.02505218) fixed=true
    Marker l_IC: pelvis (-0.05974646 0.0522231 -0.15444)
    Marker r_IC: pelvis (-0.09449728 0.04584117 0.147629)
    Marker r_mankle: pelvis (-0.1338179 -0.7159054 0.05789821)
    Marker r_mknee: pelvis (0.1406751 -0.4523013 0.02776233)
    Marker L_mankle: pelvis (-0.1359127 -0.7228583 -0.1333749)
    Marker L_mknee: pelvis (0.1283607 -0.4706427 -0.08419296)
