# OpenSim document version 40000
ExternalLoads:
  datafile: C:\Users\15086\Documents\GitHub\mocap-processing\NordTesting\JustTheBoards000001_forces_filt12Hz.mot
  ExternalForce: applied_to_body=tibia_r force_expressed_in_body=ground point_expressed_in_body=ground
      force_identifier=R_ground_force_v point_identifier=R_ground_force_p
      data_source_name=JustTheBoards000001_forces_filt12Hz.mot
  ExternalForce externalforce_0: applied_to_body=tibia_l force_expressed_in_body=ground point_expressed_in_body=ground
      force_identifier=L_ground_force_v point_identifier=L_ground_force_p
      data_source_name=JustTheBoards000001_forces_filt12Hz.mot
  ExternalForce externalforce_1: applied_to_body=patella_r force_expressed_in_body=ground
      point_expressed_in_body=ground force_identifier=R_ground_force_v point_identifier=R_ground_force_p
      data_source_name=JustTheBoards000001_forces_filt12Hz.mot
  ExternalForce externalforce_2: applied_to_body=patella_l force_expressed_in_body=ground
      point_expressed_in_body=ground force_identifier=R_ground_force_v point_identifier=L_ground_force_p
      data_source_name=JustTheBoards000001_forces_filt12Hz.mot
