# OpenSim document version 40000
InverseKinematicsTool rotated_Sprint_07200001:
  model_file: ../Models/optimized_scale_and_markers.osim
  marker_file: ../MarkerData/rotated_Sprint_07200001.trc
  output_motion_file: rotated_Sprint_07200001_ik_by_opensim.mot
  accuracy: 1e-5
  report_errors: true
  IKTaskSet IK_tasks:
    IKMarkerTask C7: weight=1 apply=true
    IKMarkerTask L.ASIS: weight=1 apply=true
    IKMarkerTask L.PSIS: weight=1 apply=true
    IKMarkerTask L_5meta: weight=1 apply=true
    IKMarkerTask L_Shoulder: weight=1 apply=true
    IKMarkerTask L_ankle: weight=1 apply=true
    IKMarkerTask L_calc: weight=1 apply=true
    IKMarkerTask L_elbow_lat: weight=1 apply=true
    IKMarkerTask L_elbow_med: weight=1 apply=true
    IKMarkerTask L_forearm: weight=1 apply=true
    IKMarkerTask L_humerus: weight=1 apply=true
    IKMarkerTask L_knee: weight=1 apply=true
    IKMarkerTask L_sh2: weight=1 apply=true
    IKMarkerTask L_sh3: weight=1 apply=true
    IKMarkerTask L_shank_antsup: weight=1 apply=true
    IKMarkerTask L_thigh1: weight=1 apply=true
    IKMarkerTask L_thigh2: weight=1 apply=true
    IKMarkerTask L_thigh3: weight=1 apply=true
    IKMarkerTask L_thigh4: weight=1 apply=true
    IKMarkerTask L_toe: weight=1 apply=true
    IKMarkerTask L_wrist_radius: weight=1 apply=true
    IKMarkerTask L_wrist_ulna: weight=1 apply=true
    IKMarkerTask R_Shoulder: weight=1 apply=true
    IKMarkerTask R_elbow_lat: weight=1 apply=true
    IKMarkerTask R_elbow_med: weight=1 apply=true
    IKMarkerTask R_forearm: weight=1 apply=true
    IKMarkerTask R_humerus: weight=1 apply=true
    IKMarkerTask R_wrist_radius: weight=1 apply=true
    IKMarkerTask R_wrist_ulna: weight=1 apply=true
    IKMarkerTask Sternum: weight=1 apply=true
    IKMarkerTask r.ASIS: weight=1 apply=true
    IKMarkerTask r.PSIS: weight=1 apply=true
    IKMarkerTask r_5meta: weight=1 apply=true
    IKMarkerTask r_ankle: weight=1 apply=true
    IKMarkerTask r_calc: weight=1 apply=true
    IKMarkerTask r_knee: weight=1 apply=true
    IKMarkerTask r_sh2: weight=1 apply=true
    IKMarkerTask r_sh3: weight=1 apply=true
    IKMarkerTask r_sh4: weight=1 apply=true
    IKMarkerTask r_shank_antsup: weight=1 apply=true
    IKMarkerTask r_thigh1: weight=1 apply=true
    IKMarkerTask r_thigh2: weight=1 apply=true
    IKMarkerTask r_thigh3: weight=1 apply=true
    IKMarkerTask r_thigh4: weight=1 apply=true
    IKMarkerTask r_thigh5: weight=1 apply=true
    IKMarkerTask r_toe: weight=1 apply=true
